# Worksheet setting: ORIGIN = 1
# Step 1: Input Data
ORIGIN := 1
b := 0.914
leq := 50
# Cube Strength is fckc
fckc := 31.25
# Cylinder strength is fck
fck := 0.8*fckc = 25
# Step 2: Calculate the compressive and tensile stress strength
fcm := fck + 8 = 33
ftm := 0.3016*fck^(2/3) = 2.57864
# Step 3: State the strain at compressive stress strength as
εcm := 0.0022
# Step 4: Calculate the initial tangent modulus of deformation of concrete Eci and the undamaged modulus of deformation
Eci := 10000*fcm^(1/3) = 32075.3
Eo := Eci*(0.8 + (0.2*fcm/88)) = 28065.9
# Step 5: Calculate the fracture and crushing energy
Gf := 0.073*fcm^0.18 = 0.136979
Gch := (fcm/ftm)^2*Gf = 22.4337
# Step 6: Calculate the critical crack opening (wc)
wc := 5.14*Gf/ftm = 0.273041
# Step 7: Build the first/second/third segments of the concrete uniaxial law
# The first segment of the curve is given by;
σc1(εc) := Eo*εc
εc1 := 0.4*fcm/Eo = 0.000470321
# The second segment of the curve is given by;
σc2(εc) := ((Eci*εc/fcm) - (εc/εcm)^2)/(1 + (((Eci*εcm/fcm) - 2)*εc/εcm))*fcm
# The third segment of the curve is given by;
γc := (π^2*fcm*εcm)/(2*((Gch/leq) - (0.5*fcm*(εcm*(1 - b) + (b*fcm/Eo))))^2) = 1.95742
σc3(εc) := ((2 + (γc*fcm*εcm))/(2*fcm) - (γc*εc) + (εc^2*γc)/(2*εcm))^-1
# The total true strain values for graph of the curve is taken as;
εc[1] := 0
εc[2] := εc1
i := 3, 4 .. 200
εc[i] := εc[1] + (0.0002*i)
εc = [
    0; 0.000470321; 0.0006; 0.0008; 0.001; 0.0012; 0.0014; 0.0016; 0.0018; 0.002
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]
# The data values for first segment of the curves are;
i := 1, 2 .. 2
σc1(εc[i]) = [0; 13.2]
σc[1] := σc1(εc[1])
σc[2] := σc1(εc[2])
# The data values for second segment of the curves are;
i := 3, 4 .. 11
σc2(εc[i]) = [16.1801; 20.2765; 23.7627; 26.6603; 28.9895; 30.7699; 32.02; 32.7577; 33]
σc[i] := σc2(εc[i])
# The data values for third segment of the curves are;
i := 12, 13 .. 200
σc3(εc[i]) = [
    32.9806; 32.9227; 32.8265; 32.6928; 32.5225; 32.3168; 32.077; 31.8047; 31.5016; 31.1696
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]
σc[i] := σc3(εc[i])
σc = [
    0; 13.2; 16.1801; 20.2765; 23.7627; 26.6603; 28.9895; 30.7699; 32.02; 32.7577
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]
# [plot: σc vs εc]
# Step 8: Build the first/second segments of the concrete uniaxial tensile law
εtm := ftm/Eo = 9.18781e-5
εt := [
    0;
    εtm;
    εtm + 0.00005;
    εtm + 0.00010;
    εtm + 0.00015;
    εtm + 0.00020;
    εtm + 0.00025;
    εtm + 0.00030;
    εtm + 0.00035;
    εtm + 0.00040;
    εtm + 0.00045;
    εtm + 0.00050;
    εtm + 0.00055;
    εtm + 0.00060;
    εtm + 0.00065;
    εtm + 0.00070;
    εtm + 0.00075;
    εtm + 0.00080;
    εtm + 0.00085;
    εtm + 0.00090;
    εtm + 0.00100;
    εtm + 0.00150;
    εtm + 0.00200;
    εtm + 0.00250;
    εtm + 0.00300;
    εtm + 0.00350;
    εtm + 0.00400
] = [0; 9.18781e-5; 0.000141878; 0.000191878; 0.000241878; 0.000291878; 0.000341878; 0.000391878; 0.000441878; 0.000491878; 0.000541878; 0.000591878; 0.000641878; 0.000691878; 0.000741878; 0.000791878; 0.000841878; 0.000891878; 0.000941878; 0.000991878; 0.00109188; 0.00159188; 0.00209188; 0.00259188; 0.00309188; 0.00359188; 0.00409188]
# The first segment of the curve is given by;
σt1(εt) := Eo*εt
# The second segment of the curve is given by;
c1 := 3
c2 := 6.93
σt2(εt) := (((1 + (c1*(εt - εtm)*leq/wc)^3)*e^(-c2*(εt - εtm)*leq/wc)) - ((εt - εtm)*leq/wc*(1 + c1^3)*e^(-c2)))*ftm
# The data values for first segment of the curves are;
i := 1, 2 .. 2
σt1(εt[i]) = [0; 2.57864]
# The data values for second segment of the curves are;
i := 3, 4 .. 27
σt2(εt[i]) = [2.41951; 2.2704; 2.13093; 2.00068; 1.87925; 1.76619; 1.66107; 1.56346; 1.47292; 1.38904; 1.3114; 1.2396; 1.17325; 1.11198; 1.05543; 1.00326; 0.95514; 0.910769; 0.832111; 0.579971; 0.448166; 0.355574; 0.274893; 0.200985; 0.135225]
σt := [
    σt1(εt[1]);
    σt1(εt[2]);
    σt2(εt[3]);
    σt2(εt[4]);
    σt2(εt[5]);
    σt2(εt[6]);
    σt2(εt[7]);
    σt2(εt[8]);
    σt2(εt[9]);
    σt2(εt[10]);
    σt2(εt[11]);
    σt2(εt[12]);
    σt2(εt[13]);
    σt2(εt[14]);
    σt2(εt[15]);
    σt2(εt[16]);
    σt2(εt[17]);
    σt2(εt[18]);
    σt2(εt[19]);
    σt2(εt[20]);
    σt2(εt[21]);
    σt2(εt[22]);
    σt2(εt[23]);
    σt2(εt[24]);
    σt2(εt[25]);
    σt2(εt[26]);
    σt2(εt[27])
] = [0; 2.57864; 2.41951; 2.2704; 2.13093; 2.00068; 1.87925; 1.76619; 1.66107; 1.56346; 1.47292; 1.38904; 1.3114; 1.2396; 1.17325; 1.11198; 1.05543; 1.00326; 0.95514; 0.910769; 0.832111; 0.579971; 0.448166; 0.355574; 0.274893; 0.200985; 0.135225]
# [plot: σt vs εt]
# Step 9: Calculation of damage parameters
fco := 0.4*fcm = 13.2
fto := ftm = 2.57864
ac := 2*(fcm/fco) - 1 + 2*sqrt((fcm/fco)^2 - (fcm/fco)) = 7.87298
at := 2*(ftm/fto) - 1 + 2*sqrt((ftm/fto)^2 - (ftm/fto)) = 1
bc := 1.97*(fck + 8)/Gch*leq = 144.894
bt := 0.453*fck^(2/3)/Gf*leq = 1413.75
# Step 10: Calculation of compressive and tensile damage variables (damage evolution)
# The compressive damage function is given by:
dc(εch) := 1 - (1/(2 + ac)*((2*(1 + ac)*e^(-bc*εch)) - (ac*e^(-2*bc*εch))))
# The compressive damage function is given by:
dt(εck) := 1 - (1/(2 + at)*((2*(1 + at)*e^(-bt*εck)) - (at*e^(-2*bt*εck))))
# Calculation of εch.
i := 11, 12 .. 200
εch[i] := εc[i] - σc[i]/Eo
σc[i] = [
    33; 32.9806; 32.9227; 32.8265; 32.6928; 32.5225; 32.3168; 32.077; 31.8047; 31.5016
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]
εc[i] = [
    0.0022; 0.0024; 0.0026; 0.0028; 0.003; 0.0032; 0.0034; 0.0036; 0.0038; 0.004
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]
εch[i] = [
    0.0010242; 0.00122489; 0.00142695; 0.00163038; 0.00183514; 0.00204121; 0.00224854; 0.00245708; 0.00266679; 0.00287759
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]
εcpl =  # error: This variable is undefined. Check that the label is set correctly.
dc(εch[i]) = [
    0.0431047; 0.054031; 0.0656574; 0.0779232; 0.0907695; 0.104139; 0.117976; 0.132226; 0.146838; 0.16176
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]
# [plot: dc(εch) vs εch]
# Calculation of εck.
i := 2, 3 .. 27
εck[i] := εt[i] - σt[i]/Eo
σt[i] = [2.57864; 2.41951; 2.2704; 2.13093; 2.00068; 1.87925; 1.76619; 1.66107; 1.56346; 1.47292; 1.38904; 1.3114; 1.2396; 1.17325; 1.11198; 1.05543; 1.00326; 0.95514; 0.910769; 0.832111; 0.579971; 0.448166; 0.355574; 0.274893; 0.200985; 0.135225]
εt[i] = [9.18781e-5; 0.000141878; 0.000191878; 0.000241878; 0.000291878; 0.000341878; 0.000391878; 0.000441878; 0.000491878; 0.000541878; 0.000591878; 0.000641878; 0.000691878; 0.000741878; 0.000791878; 0.000841878; 0.000891878; 0.000941878; 0.000991878; 0.00109188; 0.00159188; 0.00209188; 0.00259188; 0.00309188; 0.00359188; 0.00409188]
εck[i] = [0; 5.567e-5; 0.000110983; 0.000165952; 0.000220593; 0.00027492; 0.000328948; 0.000382694; 0.000436172; 0.000489397; 0.000542386; 0.000595152; 0.000647711; 0.000700075; 0.000752258; 0.000804273; 0.000856132; 0.000907846; 0.000959427; 0.00106223; 0.00157121; 0.00207591; 0.00257921; 0.00308208; 0.00358472; 0.00408706]
dt(εck[i]) = [0; 0.0523668; 0.103837; 0.153994; 0.202539; 0.249264; 0.294034; 0.33677; 0.377437; 0.416036; 0.452589; 0.487141; 0.519749; 0.550479; 0.579406; 0.606608; 0.632165; 0.656157; 0.678666; 0.719545; 0.859298; 0.930088; 0.965446; 0.982971; 0.991619; 0.995877]
# [plot: dt(εck[i]) vs εck[i]]
# Step 11: Calculation of compressive and tensile plastic strains
i := 1, 2 .. 35
εcpl[i] := εch[i] - (σc[i]*dc(εch[i]))/((1 - dc(εch[i]))*Eo)
i := 1, 2 .. 27
εtpl[i] := εck[i] - (σt[i]*dt(εck[i]))/((1 - dt(εck[i]))*Eo)
εcpl = [
    0; 0; 0; 0; 0; 0; 0; 0; 0; 0
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]
i := 1, 2 .. 27
εtpl[i] = [0; 0; 5.09061e-5; 0.00010161; 0.000152132; 0.000202488; 0.000252688; 0.000302738; 0.000352641; 0.000402399; 0.000452008; 0.000501467; 0.00055077; 0.000599911; 0.000648883; 0.000697678; 0.000746286; 0.000794698; 0.000842903; 0.00089089; 0.000986162; 0.00144501; 0.00186347; 0.00222523; 0.00251672; 0.00273742; 0.00292328]
# Step 13: Avg ratio check
i := 11, 12 .. 35
b[i] := εcpl[i]/εch[i]
εch[i] = [0.0010242; 0.00122489; 0.00142695; 0.00163038; 0.00183514; 0.00204121; 0.00224854; 0.00245708; 0.00266679; 0.00287759; 0.00308941; 0.0033022; 0.00351587; 0.00373035; 0.00394556; 0.00416142; 0.00437786; 0.00459479; 0.00481215; 0.00502986; 0.00524785; 0.00546606; 0.00568442; 0.00590288; 0.00612138]
b[i] = [0.948286; 0.945204; 0.942232; 0.939374; 0.936632; 0.934008; 0.931505; 0.929123; 0.926864; 0.924729; 0.922717; 0.920828; 0.919061; 0.917414; 0.915885; 0.914472; 0.91317; 0.911977; 0.910889; 0.909901; 0.90901; 0.908211; 0.9075; 0.906871; 0.90632]
