# Worksheet setting: ORIGIN = 1
n := 300
n2 := 17
# Step:1
fck_cube := 20/0.8 = 25
fck := 0.8*fck_cube = 20
leq := 70
b := 0.86043
# Step:2
fcm := fck + 8 = 28
ftm := 0.3016*fck^(2/3) = 2.22221
# Step:3
εcm := 0.0022
# Step:4
Eci := 10000*fcm^(1/3) = 30365.9
Eo := Eci*(0.8 + (0.2*fcm/88)) = 26225.1
# Step:5
Gf := 0.073*fcm^0.18 = 0.132988
Gch := (fcm/ftm)^2*Gf = 21.1134
# Step:6
wc := 5.14*Gf/ftm = 0.307602
# Step:7
# First segment of the compression data is given by;
σc1(εc) := Eo*εc
# Second segment of the compression data is given by;
σc2(εc) := ((Eci*εc/fcm) - (εc/εcm)^2)/(1 + (((Eci*εcm/fcm) - 2)*εc/εcm))*fcm
# Third segment of the compression data is given by;
γc := (π^2*fcm*εcm)/(2*((Gch/leq) - (0.5*fcm*(εcm*(1 - b) + (b*fcm/Eo))))^2) = 3.75672
σc3(εc) := ((2 + (γc*fcm*εcm))/(2*fcm) - (γc*εc) + (εc^2*γc/(2*εcm)))^-1
# First segment of the compression data calculation are
εc[1] := 0.
εc[2] := 0.4*fcm/Eo = 0.000427072
σc1(εc[1]) = 0
σc1(εc[2]) = 11.2
# [Excel component]
    excel["A1"] := σc1(εc)
    excel["B1"] := εc
    σc[1] := excel["A1:A1"]
    σc[2] := excel["A2:A2"]
    εc[1] := excel["B1:B1"]
    εc[2] := excel["B2:B2"]
σc[1] = 0
εc[1] = 0
σc[2] = 11.2
εc[2] = 0.000427072
# Second segment of the compression data calculation are
i := 3, 4 .. 11
εc[i] := εc[1] + (0.0002*i)
εc[i] = [0.0006; 0.0008; 0.001; 0.0012; 0.0014; 0.0016; 0.0018; 0.002; 0.0022]
σc2(εc[i]) = [14.6003; 18.0565; 20.9126; 23.2208; 25.0275; 26.3738; 27.2965; 27.8287; 28]
# [Excel component]
    excel["A1"] := εc
    excel["B1"] := σc2(εc)
    σc[3] := excel["B3:B3"]
    σc[4] := excel["B4:B4"]
    σc[5] := excel["B5:B5"]
    σc[6] := excel["B6:B6"]
    σc[7] := excel["B7:B7"]
    σc[8] := excel["B8:B8"]
    σc[9] := excel["B9:B9"]
    σc[10] := excel["B10:B10"]
    σc[11] := excel["B11:B11"]
    εc[3] := excel["A3:A3"]
    εc[4] := excel["A4:A4"]
    εc[5] := excel["A5:A5"]
    εc[6] := excel["A6:A6"]
    εc[7] := excel["A7:A7"]
    εc[8] := excel["A8:A8"]
    εc[9] := excel["A9:A9"]
    εc[10] := excel["A10:A10"]
    εc[11] := excel["A11:A11"]
εc = [0; 0.000427072; 0.0006; 0.0008; 0.001; 0.0012; 0.0014; 0.0016; 0.0018; 0.002; 0.0022]
σc = [0; 11.2; 14.6003; 18.0565; 20.9126; 23.2208; 25.0275; 26.3738; 27.2965; 27.8287; 28]
# Third segment of the compression data calculation are
i := 12, 13 .. n
εc[i] := εc[1] + (0.0002*i)
εc[i] = [
    0.0024; 0.0026; 0.0028; 0.003; 0.0032; 0.0034; 0.0036; 0.0038; 0.004; 0.0042
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]
σc3(εc[i]) = [
    27.9733; 27.8933; 27.7611; 27.5781; 27.3463; 27.0682; 26.7467; 26.3852; 25.9871; 25.5562
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]
# [Excel component]
    excel["F1"] := εc
    excel["A1"] := σc
    excel["B1"] := σc3(εc)
    excel["B1:B10"] := NaN
    excel["I1"] := "Eo"
    excel["J1"] := Eo
    excel["G3"] := 0
    σc := excel["E1:E300"]
    εch := excel["G1:G300"]
σc = [
    0; 11.2; 14.6003; 18.0565; 20.9126; 23.2208; 25.0275; 26.3738; 27.2965; 27.8287
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]
εch = [
    0; 0; 0; 0.000111481; 0.000202573; 0.000314557; 0.000445667; 0.000594331; 0.000759146; 0.000938852
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]
# [plot: σc vs εch]
# Step:8
# First segment of the tension curve is given by;
σt1(εt) := Eo*εt
# Second segment of the tension curve is given by;
εtm := ftm/Eo = 8.4736e-5
c1 := 3
c2 := 6.93
σt2(εt) := ftm*(((1 + (c1*(εt - εtm)*leq/wc)^3)*e^(-c2*(εt - εtm)*leq/wc)) - (((εt - εtm)*leq/wc)*(1 + c1^3)*e^(-c2)))
# First segment of the tension data calculation are
εt[1] := 0.
εt[2] := ftm/Eo = 8.4736e-5
σt1(εt[1]) = 0
σt1(εt[2]) = 2.22221
# [Excel component]
    excel["A1"] := σt1(εt)
    excel["B1"] := εt
    σt[1] := excel["A1:A1"]
    σt[2] := excel["A2:A2"]
    εt[1] := excel["B1:B1"]
    εt[2] := excel["B2:B2"]
σt = [0; 2.22221]
εt = [0; 8.4736e-5]
# Second segment of the tension data calculation are
j := 3, 4 .. n2
εt[j] := εtm + (j^2*0.000010)
εt[j] = [0.000174736; 0.000244736; 0.000334736; 0.000444736; 0.000574736; 0.000724736; 0.000894736; 0.00108474; 0.00129474; 0.00152474; 0.00177474; 0.00204474; 0.00233474; 0.00264474; 0.00297474]
σt2(εt[j]) = [1.92736; 1.72667; 1.50215; 1.27328; 1.05771; 0.86863; 0.713001; 0.591305; 0.498722; 0.427352; 0.368727; 0.315887; 0.26452; 0.213104; 0.162266]
# [Excel component]
    excel["H1"] := "Eo"
    excel["I1"] := Eo
    excel["A1"] := εt[1]
    excel["A2"] := εt[2]
    excel["A3"] := εt[3]
    excel["A4"] := εt[4]
    excel["A5"] := εt[5]
    excel["A6"] := εt[6]
    excel["A7"] := εt[7]
    excel["A8"] := εt[8]
    excel["A9"] := εt[9]
    excel["A10"] := εt[10]
    excel["A11"] := εt[11]
    excel["A12"] := εt[12]
    excel["A13"] := εt[13]
    excel["A14"] := εt[14]
    excel["A15"] := εt[15]
    excel["A16"] := εt[16]
    excel["A17"] := εt[17]
    excel["B1"] := σt1(εt[1])
    excel["B2"] := σt1(εt[2])
    excel["B3"] := σt2(εt[3])
    excel["B4"] := σt2(εt[4])
    excel["B5"] := σt2(εt[5])
    excel["B6"] := σt2(εt[6])
    excel["B7"] := σt2(εt[7])
    excel["B8"] := σt2(εt[8])
    excel["B9"] := σt2(εt[9])
    excel["B10"] := σt2(εt[10])
    excel["B11"] := σt2(εt[11])
    excel["B12"] := σt2(εt[12])
    excel["B13"] := σt2(εt[13])
    excel["B14"] := σt2(εt[14])
    excel["B15"] := σt2(εt[15])
    excel["B16"] := σt2(εt[16])
    excel["B17"] := σt2(εt[17])
    σt := excel["E4:E20"]
    εck := excel["G4:G20"]
σt = [0; 2.22221; 1.92736; 1.72667; 1.50215; 1.27328; 1.05771; 0.86863; 0.713001; 0.591305; 0.498722; 0.427352; 0.368727; 0.315887; 0.26452; 0.213104; 0.162266]
εck = [0; 0; 0.000101243; 0.000178896; 0.000277457; 0.000396184; 0.000534404; 0.000691614; 0.000867548; 0.00106219; 0.00127572; 0.00150844; 0.00176068; 0.00203269; 0.00232465; 0.00263661; 0.00296855]
# [plot: σt vs εck]
# Step:9
fco := 0.4*fcm = 11.2
fto := ftm = 2.22221
ac := (2*(fcm/fco)) - 1 + 2*sqrt((fcm/fco)^2 - (fcm/fco)) = 7.87298
at := (2*(ftm/fto)) - 1 + 2*sqrt((ftm/fto)^2 - (ftm/fto)) = 1
bc := (fco*leq/Gch)*(1 + ac/2) = 183.306
bt := (fto*leq/Gf)*(1 + at/2) = 1754.54
# Step:10 Compression Damage
dc := 1 - (1/(2 + ac)*((2*(1 + ac)*e^(-bc*εch)) - (ac*e^(-2*bc*εch))))
εcpl[i] := εch[i] - (σc[i]*dc[i])/((1 - dc[i])*Eo)
σc = [
    0; 11.2; 14.6003; 18.0565; 20.9126; 23.2208; 25.0275; 26.3738; 27.2965; 27.8287
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]
dc = [
    0; 0; 0; 0.00442387; 0.00844374; 0.0138534; 0.0207981; 0.0294056; 0.0397731; 0.0519602
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]
εch = [
    0; 0; 0; 0.000111481; 0.000202573; 0.000314557; 0.000445667; 0.000594331; 0.000759146; 0.000938852
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]
εcpl = [
    0; 0; 0; 0; 0; 0; 0; 0; 0; 0
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]
# USE THE COMPRESSION DATA IN THIS TABLE IN ABAQUS (DOUBLE CLICK TO OPEN)
# [Excel component]
    excel["A2"] := σc
    excel["B2"] := εch
    excel["D2"] := dc
    excel["E2"] := εch
    excel["J2"] := "Eo"
    excel["K2"] := Eo
    excel["F2"] := εcpl
    excel["A1:A1"] := "σc"
    excel["B1:B1"] := "εch"
    excel["D1:D1"] := "dc"
    excel["E1:E1"] := "εch"
    excel["F1:F1"] := "εcpl"
    excel["D2:D12"] := 0
    dc := excel["D12:D157"]
    εch := excel["E12:E157"]
    AVG := excel["K13:K13"]
    σc := excel["A12:A157"]
AVG = 0.860439
# [plot: σc vs εch]
# [plot: dc vs εch]
# Step:10 Tension Damage
i := 1, 2 .. n2
dt := 1 - (1/(2 + at)*((2*(1 + at)*e^(-bt*εck)) - (at*e^(-2*bt*εck))))
εtpl[i] := εck[i] - (σt[i]*dt[i])/((1 - dt[i])*Eo)
# USE THE TENSION DATA IN THIS TABLE IN ABAQUS (DOUBLE CLICK TO OPEN)
# [Excel component]
    excel["A2"] := σt
    excel["B2"] := εck
    excel["D2"] := dt
    excel["E2"] := εck
    excel["J2"] := "Eo"
    excel["K2"] := Eo
    excel["F2"] := εtpl
    excel["A1"] := "σt"
    excel["B1"] := "εck"
    excel["D1"] := "dt"
    excel["E1"] := "εck"
    excel["F1"] := "εtpl"
    σt := excel["A3:A17"]
    εck := excel["B3:B17"]
    dt := excel["D3:D17"]
    εtpl := excel["F3:F17"]
σt = [2.22221; 1.92736; 1.72667; 1.50215; 1.27328; 1.05771; 0.86863; 0.713001; 0.591305; 0.498722; 0.427352; 0.368727; 0.315887; 0.26452; 0.213104]
εck = [0; 0.000101243; 0.000178896; 0.000277457; 0.000396184; 0.000534404; 0.000691614; 0.000867548; 0.00106219; 0.00127572; 0.00150844; 0.00176068; 0.00203269; 0.00232465; 0.00263661]
dt = [0; 0.11733; 0.203786; 0.306458; 0.417652; 0.529033; 0.633214; 0.724886; 0.801212; 0.861604; 0.907154; 0.939972; 0.962591; 0.977523; 0.986974]
εtpl = [0; 9.14736e-5; 0.000162044; 0.000252146; 0.000361363; 0.000489099; 0.000634432; 0.000795912; 0.000971312; 0.00115733; 0.00134922; 0.00154051; 0.00172275; 0.001886; 0.00202091]
# [plot: σt vs εck]
# [plot: dt vs εck]
