# Worksheet setting: ORIGIN = 1
n := 300
n2 := 17
# Step:1
fck_cube := 40/0.8 = 50
fck := 0.8*fck_cube = 40
leq := 70
b := 0.77668
# Step:2
fcm := fck + 8 = 48
ftm := 0.3016*fck^(2/3) = 3.52753
# Step:3
εcm := 0.0022
# Step:4
Eci := 10000*fcm^(1/3) = 36342.4
Eo := Eci*(0.8 + (0.2*fcm/88)) = 33038.6
# Step:5
Gf := 0.073*fcm^0.18 = 0.146537
Gch := (fcm/ftm)^2*Gf = 27.1323
# Step:6
wc := 5.14*Gf/ftm = 0.21352
# Step:7
# First segment of the compression data is given by;
σc1(εc) := Eo*εc
# Second segment of the compression data is given by;
σc2(εc) := ((Eci*εc/fcm) - (εc/εcm)^2)/(1 + (((Eci*εcm/fcm) - 2)*εc/εcm))*fcm
# Third segment of the compression data is given by;
γc := (π^2*fcm*εcm)/(2*((Gch/leq) - (0.5*fcm*(εcm*(1 - b) + (b*fcm/Eo))))^2) = 4.28502
σc3(εc) := ((2 + (γc*fcm*εcm))/(2*fcm) - (γc*εc) + (εc^2*γc/(2*εcm)))^-1
# First segment of the compression data calculation are
εc[1] := 0.
εc[2] := 0.4*fcm/Eo = 0.000581139
σc1(εc[1]) = 0
σc1(εc[2]) = 19.2
# [Excel component]
    excel["A1"] := σc1(εc)
    excel["B1"] := εc
    σc[1] := excel["A1:A1"]
    σc[2] := excel["A2:A2"]
    εc[1] := excel["B1:B1"]
    εc[2] := excel["B2:B2"]
σc[1] = 0
εc[1] = 0
σc[2] = 19.2
εc[2] = 0.000581139
# Second segment of the compression data calculation are
i := 3, 4 .. 11
εc[i] := εc[1] + (0.0002*i)
εc[i] = [0.0006; 0.0008; 0.001; 0.0012; 0.0014; 0.0016; 0.0018; 0.002; 0.0022]
σc2(εc[i]) = [20.0646; 25.872; 31.1601; 35.8709; 39.9377; 43.2829; 45.8158; 47.4301; 48]
# [Excel component]
    excel["A1"] := εc
    excel["B1"] := σc2(εc)
    σc[3] := excel["B3:B3"]
    σc[4] := excel["B4:B4"]
    σc[5] := excel["B5:B5"]
    σc[6] := excel["B6:B6"]
    σc[7] := excel["B7:B7"]
    σc[8] := excel["B8:B8"]
    σc[9] := excel["B9:B9"]
    σc[10] := excel["B10:B10"]
    σc[11] := excel["B11:B11"]
    εc[3] := excel["A3:A3"]
    εc[4] := excel["A4:A4"]
    εc[5] := excel["A5:A5"]
    εc[6] := excel["A6:A6"]
    εc[7] := excel["A7:A7"]
    εc[8] := excel["A8:A8"]
    εc[9] := excel["A9:A9"]
    εc[10] := excel["A10:A10"]
    εc[11] := excel["A11:A11"]
εc = [0; 0.000581139; 0.0006; 0.0008; 0.001; 0.0012; 0.0014; 0.0016; 0.0018; 0.002; 0.0022]
σc = [0; 19.2; 20.0646; 25.872; 31.1601; 35.8709; 39.9377; 43.2829; 45.8158; 47.4301; 48]
# Third segment of the compression data calculation are
i := 12, 13 .. n
εc[i] := εc[1] + (0.0002*i)
εc[i] = [
    0.0024; 0.0026; 0.0028; 0.003; 0.0032; 0.0034; 0.0036; 0.0038; 0.004; 0.0042
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]
σc3(εc[i]) = [
    47.9104; 47.6437; 47.2056; 46.6057; 45.8564; 44.9727; 43.9713; 42.8698; 41.6864; 40.4387
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]
# [Excel component]
    excel["F1"] := εc
    excel["A1"] := σc
    excel["B1"] := σc3(εc)
    excel["B1:B10"] := NaN
    excel["I1"] := "Eo"
    excel["J1"] := Eo
    excel["G3"] := 0
    σc := excel["E1:E300"]
    εch := excel["G1:G300"]
σc = [
    0; 19.2; 20.0646; 25.872; 31.1601; 35.8709; 39.9377; 43.2829; 45.8158; 47.4301
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]
εch = [
    0; 0; 0; 1.69158e-5; 5.68578e-5; 0.000114271; 0.000191178; 0.000289929; 0.000413263; 0.000564401
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]
# [plot: σc vs εch]
# Step:8
# First segment of the tension curve is given by;
σt1(εt) := Eo*εt
# Second segment of the tension curve is given by;
εtm := ftm/Eo = 0.00010677
c1 := 3
c2 := 6.93
σt2(εt) := ftm*(((1 + (c1*(εt - εtm)*leq/wc)^3)*e^(-c2*(εt - εtm)*leq/wc)) - (((εt - εtm)*leq/wc)*(1 + c1^3)*e^(-c2)))
# First segment of the tension data calculation are
εt[1] := 0.
εt[2] := ftm/Eo = 0.00010677
σt1(εt[1]) = 0
σt1(εt[2]) = 3.52753
# [Excel component]
    excel["A1"] := σt1(εt)
    excel["B1"] := εt
    σt[1] := excel["A1:A1"]
    σt[2] := excel["A2:A2"]
    εt[1] := excel["B1:B1"]
    εt[2] := excel["B2:B2"]
σt = [0; 3.52753]
εt = [0; 0.00010677]
# Second segment of the tension data calculation are
j := 3, 4 .. n2
εt[j] := εtm + (j^2*0.000010)
εt[j] = [0.00019677; 0.00026677; 0.00035677; 0.00046677; 0.00059677; 0.00074677; 0.00091677; 0.00110677; 0.00131677; 0.00154677; 0.00179677; 0.00206677; 0.00235677; 0.00266677; 0.00299677]
σt2(εt[j]) = [2.87436; 2.45695; 2.02074; 1.61462; 1.27295; 1.00939; 0.817616; 0.678114; 0.567848; 0.468515; 0.370656; 0.273233; 0.180317; 0.0971738; 0.0274671]
# [Excel component]
    excel["H1"] := "Eo"
    excel["I1"] := Eo
    excel["A1"] := εt[1]
    excel["A2"] := εt[2]
    excel["A3"] := εt[3]
    excel["A4"] := εt[4]
    excel["A5"] := εt[5]
    excel["A6"] := εt[6]
    excel["A7"] := εt[7]
    excel["A8"] := εt[8]
    excel["A9"] := εt[9]
    excel["A10"] := εt[10]
    excel["A11"] := εt[11]
    excel["A12"] := εt[12]
    excel["A13"] := εt[13]
    excel["A14"] := εt[14]
    excel["A15"] := εt[15]
    excel["A16"] := εt[16]
    excel["A17"] := εt[17]
    excel["B1"] := σt1(εt[1])
    excel["B2"] := σt1(εt[2])
    excel["B3"] := σt2(εt[3])
    excel["B4"] := σt2(εt[4])
    excel["B5"] := σt2(εt[5])
    excel["B6"] := σt2(εt[6])
    excel["B7"] := σt2(εt[7])
    excel["B8"] := σt2(εt[8])
    excel["B9"] := σt2(εt[9])
    excel["B10"] := σt2(εt[10])
    excel["B11"] := σt2(εt[11])
    excel["B12"] := σt2(εt[12])
    excel["B13"] := σt2(εt[13])
    excel["B14"] := σt2(εt[14])
    excel["B15"] := σt2(εt[15])
    excel["B16"] := σt2(εt[16])
    excel["B17"] := σt2(εt[17])
    σt := excel["E4:E20"]
    εck := excel["G4:G20"]
σt = [0; 3.52753; 2.87436; 2.45695; 2.02074; 1.61462; 1.27295; 1.00939; 0.817616; 0.678114; 0.567848; 0.468515; 0.370656; 0.273233; 0.180317; 0.0971738; 0.0274671]
εck = [0; 0; 0.00010977; 0.000192404; 0.000295607; 0.000417899; 0.000558241; 0.000716218; 0.000892023; 0.00108625; 0.00129958; 0.00153259; 0.00178555; 0.0020585; 0.00235131; 0.00266383; 0.00299594]
# [plot: σt vs εck]
# Step:9
fco := 0.4*fcm = 19.2
fto := ftm = 3.52753
ac := (2*(fcm/fco)) - 1 + 2*sqrt((fcm/fco)^2 - (fcm/fco)) = 7.87298
at := (2*(ftm/fto)) - 1 + 2*sqrt((ftm/fto)^2 - (ftm/fto)) = 1
bc := (fco*leq/Gch)*(1 + ac/2) = 244.53
bt := (fto*leq/Gf)*(1 + at/2) = 2527.63
# Step:10 Compression Damage
dc := 1 - (1/(2 + ac)*((2*(1 + ac)*e^(-bc*εch)) - (ac*e^(-2*bc*εch))))
εcpl[i] := εch[i] - (σc[i]*dc[i])/((1 - dc[i])*Eo)
σc = [
    0; 19.2; 20.0646; 25.872; 31.1601; 35.8709; 39.9377; 43.2829; 45.8158; 47.4301
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]
dc = [
    0; 0; 0; 0.000849785; 0.00294899; 0.00618758; 0.0109155; 0.0175997; 0.0268376; 0.0393662
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]
εch = [
    0; 0; 0; 1.69158e-5; 5.68578e-5; 0.000114271; 0.000191178; 0.000289929; 0.000413263; 0.000564401
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]
εcpl = [
    0; 0; 0; 0; 0; 0; 0; 0; 0; 0
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]
# USE THE COMPRESSION DATA IN THIS TABLE IN ABAQUS (DOUBLE CLICK TO OPEN)
# [Excel component]
    excel["A2"] := σc
    excel["B2"] := εch
    excel["D2"] := dc
    excel["E2"] := εch
    excel["J2"] := "Eo"
    excel["K2"] := Eo
    excel["F2"] := εcpl
    excel["A1:A1"] := "σc"
    excel["B1:B1"] := "εch"
    excel["D1:D1"] := "dc"
    excel["E1:E1"] := "εch"
    excel["F1:F1"] := "εcpl"
    excel["D2:D12"] := 0
    dc := excel["D12:D103"]
    εch := excel["E12:E103"]
    AVG := excel["K13:K13"]
    σc := excel["A12:A103"]
AVG = 0.776687
# [plot: σc vs εch]
# [plot: dc vs εch]
# Step:10 Tension Damage
i := 1, 2 .. n2
dt := 1 - (1/(2 + at)*((2*(1 + at)*e^(-bt*εck)) - (at*e^(-2*bt*εck))))
εtpl[i] := εck[i] - (σt[i]*dt[i])/((1 - dt[i])*Eo)
# USE THE TENSION DATA IN THIS TABLE IN ABAQUS (DOUBLE CLICK TO OPEN)
# [Excel component]
    excel["A2"] := σt
    excel["B2"] := εck
    excel["D2"] := dt
    excel["E2"] := εck
    excel["J2"] := "Eo"
    excel["K2"] := Eo
    excel["F2"] := εtpl
    excel["A1"] := "σt"
    excel["B1"] := "εck"
    excel["D1"] := "dt"
    excel["E1"] := "εck"
    excel["F1"] := "εtpl"
    σt := excel["A3:A17"]
    εck := excel["B3:B17"]
    dt := excel["D3:D17"]
    εtpl := excel["F3:F17"]
σt = [3.52753; 2.87436; 2.45695; 2.02074; 1.61462; 1.27295; 1.00939; 0.817616; 0.678114; 0.567848; 0.468515; 0.370656; 0.273233; 0.180317; 0.0971738]
εck = [0; 0.00010977; 0.000192404; 0.000295607; 0.000417899; 0.000558241; 0.000716218; 0.000892023; 0.00108625; 0.00129958; 0.00153259; 0.00178555; 0.0020585; 0.00235131; 0.00266383]
dt = [0; 0.181098; 0.306185; 0.4432; 0.576653; 0.694638; 0.79079; 0.863796; 0.915764; 0.95054; 0.972439; 0.985423; 0.992678; 0.996504; 0.998413]
εtpl = [0; 9.05304e-5; 0.000159586; 0.000246923; 0.000351331; 0.000470595; 0.000600736; 0.000735077; 0.000863111; 0.000969267; 0.00103224; 0.00102716; 0.000937327; 0.000795472; 0.000813644]
# [plot: σt vs εck]
# [plot: dt vs εck]
