# Worksheet setting: ORIGIN = 1
n := 300
n2 := 17
# Step:1
fck_cube := 12/0.8 = 15
fck := 0.8*fck_cube = 12
leq := 70
b := 0.86043
# Step:2
fcm := fck + 8 = 20
ftm := 0.3016*fck^(2/3) = 1.58083
# Step:3
εcm := 0.0022
# Step:4
Eci := 10000*fcm^(1/3) = 27144.2
Eo := Eci*(0.8 + (0.2*fcm/88)) = 22949.2
# Step:5
Gf := 0.073*fcm^0.18 = 0.125172
Gch := (fcm/ftm)^2*Gf = 20.0354
# Step:6
wc := 5.14*Gf/ftm = 0.406992
# Step:7
# First segment of the compression data is given by;
σc1(εc) := Eo*εc
# Second segment of the compression data is given by;
σc2(εc) := ((Eci*εc/fcm) - (εc/εcm)^2)/(1 + (((Eci*εcm/fcm) - 2)*εc/εcm))*fcm
# Third segment of the compression data is given by;
γc := (π^2*fcm*εcm)/(2*((Gch/leq) - (0.5*fcm*(εcm*(1 - b) + (b*fcm/Eo))))^2) = 2.85762
σc3(εc) := ((2 + (γc*fcm*εcm))/(2*fcm) - (γc*εc) + (εc^2*γc/(2*εcm)))^-1
# First segment of the compression data calculation are
εc[1] := 0.
εc[2] := 0.4*fcm/Eo = 0.000348597
σc1(εc[1]) = 0
σc1(εc[2]) = 8
# [Excel component]
    excel["A1"] := σc1(εc)
    excel["B1"] := εc
    σc[1] := excel["A1:A1"]
    σc[2] := excel["A2:A2"]
    εc[1] := excel["B1:B1"]
    εc[2] := excel["B2:B2"]
σc[1] = 0
εc[1] = 0
σc[2] = 8
εc[2] = 0.000348597
# Second segment of the compression data calculation are
i := 3, 4 .. 11
εc[i] := εc[1] + (0.0002*i)
εc[i] = [0.0006; 0.0008; 0.001; 0.0012; 0.0014; 0.0016; 0.0018; 0.002; 0.0022]
σc2(εc[i]) = [11.663; 14.0381; 15.8909; 17.3128; 18.3749; 19.1336; 19.634; 19.9128; 20]
# [Excel component]
    excel["A1"] := εc
    excel["B1"] := σc2(εc)
    σc[3] := excel["B3:B3"]
    σc[4] := excel["B4:B4"]
    σc[5] := excel["B5:B5"]
    σc[6] := excel["B6:B6"]
    σc[7] := excel["B7:B7"]
    σc[8] := excel["B8:B8"]
    σc[9] := excel["B9:B9"]
    σc[10] := excel["B10:B10"]
    σc[11] := excel["B11:B11"]
    εc[3] := excel["A3:A3"]
    εc[4] := excel["A4:A4"]
    εc[5] := excel["A5:A5"]
    εc[6] := excel["A6:A6"]
    εc[7] := excel["A7:A7"]
    εc[8] := excel["A8:A8"]
    εc[9] := excel["A9:A9"]
    εc[10] := excel["A10:A10"]
    εc[11] := excel["A11:A11"]
εc = [0; 0.000348597; 0.0006; 0.0008; 0.001; 0.0012; 0.0014; 0.0016; 0.0018; 0.002; 0.0022]
σc = [0; 8; 11.663; 14.0381; 15.8909; 17.3128; 18.3749; 19.1336; 19.634; 19.9128; 20]
# Third segment of the compression data calculation are
i := 12, 13 .. n
εc[i] := εc[1] + (0.0002*i)
εc[i] = [
    0.0024; 0.0026; 0.0028; 0.003; 0.0032; 0.0034; 0.0036; 0.0038; 0.004; 0.0042
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]
σc3(εc[i]) = [
    19.9896; 19.9585; 19.9069; 19.8351; 19.7435; 19.6328; 19.5035; 19.3564; 19.1923; 19.0122
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]
# [Excel component]
    excel["F1"] := εc
    excel["A1"] := σc
    excel["B1"] := σc3(εc)
    excel["B1:B10"] := NaN
    excel["I1"] := "Eo"
    excel["J1"] := Eo
    excel["G3"] := 0
    σc := excel["E1:E300"]
    εch := excel["G1:G300"]
σc = [
    0; 8; 11.663; 14.0381; 15.8909; 17.3128; 18.3749; 19.1336; 19.634; 19.9128
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]
εch = [
    0; 0; 0; 0.000188295; 0.000307559; 0.000445603; 0.000599322; 0.000766262; 0.000944455; 0.00113231
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]
# [plot: σc vs εch]
# Step:8
# First segment of the tension curve is given by;
σt1(εt) := Eo*εt
# Second segment of the tension curve is given by;
εtm := ftm/Eo = 6.8884e-5
c1 := 3
c2 := 6.93
σt2(εt) := ftm*(((1 + (c1*(εt - εtm)*leq/wc)^3)*e^(-c2*(εt - εtm)*leq/wc)) - (((εt - εtm)*leq/wc)*(1 + c1^3)*e^(-c2)))
# First segment of the tension data calculation are
εt[1] := 0.
εt[2] := ftm/Eo = 6.8884e-5
σt1(εt[1]) = 0
σt1(εt[2]) = 1.58083
# [Excel component]
    excel["A1"] := σt1(εt)
    excel["B1"] := εt
    σt[1] := excel["A1:A1"]
    σt[2] := excel["A2:A2"]
    εt[1] := excel["B1:B1"]
    εt[2] := excel["B2:B2"]
σt = [0; 1.58083]
εt = [0; 6.8884e-5]
# Second segment of the tension data calculation are
j := 3, 4 .. n2
εt[j] := εtm + (j^2*0.000010)
εt[j] = [0.000158884; 0.000228884; 0.000318884; 0.000428884; 0.000558884; 0.000708884; 0.000878884; 0.00106888; 0.00127888; 0.00150888; 0.00175888; 0.00202888; 0.00231888; 0.00262888; 0.00295888]
σt2(εt[j]) = [1.4195; 1.3059; 1.17414; 1.0332; 0.892136; 0.758999; 0.639917; 0.538496; 0.455652; 0.389923; 0.338154; 0.296387; 0.260731; 0.228031; 0.196236]
# [Excel component]
    excel["H1"] := "Eo"
    excel["I1"] := Eo
    excel["A1"] := εt[1]
    excel["A2"] := εt[2]
    excel["A3"] := εt[3]
    excel["A4"] := εt[4]
    excel["A5"] := εt[5]
    excel["A6"] := εt[6]
    excel["A7"] := εt[7]
    excel["A8"] := εt[8]
    excel["A9"] := εt[9]
    excel["A10"] := εt[10]
    excel["A11"] := εt[11]
    excel["A12"] := εt[12]
    excel["A13"] := εt[13]
    excel["A14"] := εt[14]
    excel["A15"] := εt[15]
    excel["A16"] := εt[16]
    excel["A17"] := εt[17]
    excel["B1"] := σt1(εt[1])
    excel["B2"] := σt1(εt[2])
    excel["B3"] := σt2(εt[3])
    excel["B4"] := σt2(εt[4])
    excel["B5"] := σt2(εt[5])
    excel["B6"] := σt2(εt[6])
    excel["B7"] := σt2(εt[7])
    excel["B8"] := σt2(εt[8])
    excel["B9"] := σt2(εt[9])
    excel["B10"] := σt2(εt[10])
    excel["B11"] := σt2(εt[11])
    excel["B12"] := σt2(εt[12])
    excel["B13"] := σt2(εt[13])
    excel["B14"] := σt2(εt[14])
    excel["B15"] := σt2(εt[15])
    excel["B16"] := σt2(εt[16])
    excel["B17"] := σt2(εt[17])
    σt := excel["E4:E20"]
    εck := excel["G4:G20"]
σt = [0; 1.58083; 1.4195; 1.3059; 1.17414; 1.0332; 0.892136; 0.758999; 0.639917; 0.538496; 0.455652; 0.389923; 0.338154; 0.296387; 0.260731; 0.228031; 0.196236]
εck = [0; 0; 9.70298e-5; 0.00017198; 0.000267722; 0.000383863; 0.00052001; 0.000675811; 0.000851; 0.00104542; 0.00125903; 0.00149189; 0.00174415; 0.00201597; 0.00230752; 0.00261895; 0.00295033]
# [plot: σt vs εck]
# Step:9
fco := 0.4*fcm = 8
fto := ftm = 1.58083
ac := (2*(fcm/fco)) - 1 + 2*sqrt((fcm/fco)^2 - (fcm/fco)) = 7.87298
at := (2*(ftm/fto)) - 1 + 2*sqrt((ftm/fto)^2 - (ftm/fto)) = 1
bc := (fco*leq/Gch)*(1 + ac/2) = 137.978
bt := (fto*leq/Gf)*(1 + at/2) = 1326.07
# Step:10 Compression Damage
dc := 1 - (1/(2 + ac)*((2*(1 + ac)*e^(-bc*εch)) - (ac*e^(-2*bc*εch))))
εcpl[i] := εch[i] - (σc[i]*dc[i])/((1 - dc[i])*Eo)
σc = [
    0; 8; 11.663; 14.0381; 15.8909; 17.3128; 18.3749; 19.1336; 19.634; 19.9128
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]
dc = [
    0; 0; 0; 0.00571965; 0.0097932; 0.0149153; 0.0211005; 0.0283511; 0.0366544; 0.0459831
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]
εch = [
    0; 0; 0; 0.000188295; 0.000307559; 0.000445603; 0.000599322; 0.000766262; 0.000944455; 0.00113231
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]
εcpl = [
    0; 0; 0; 0; 0; 0; 0; 0; 0; 0
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]
# USE THE COMPRESSION DATA IN THIS TABLE IN ABAQUS (DOUBLE CLICK TO OPEN)
# [Excel component]
    excel["A2"] := σc
    excel["B2"] := εch
    excel["D2"] := dc
    excel["E2"] := εch
    excel["J2"] := "Eo"
    excel["K2"] := Eo
    excel["F2"] := εcpl
    excel["A1:A1"] := "σc"
    excel["B1:B1"] := "εch"
    excel["D1:D1"] := "dc"
    excel["E1:E1"] := "εch"
    excel["F1:F1"] := "εcpl"
    excel["D2:D12"] := 0
    dc := excel["D12:D157"]
    εch := excel["E12:E157"]
    AVG := excel["K13:K13"]
    σc := excel["A12:A157"]
AVG = 0.930319
# [plot: σc vs εch]
# [plot: dc vs εch]
# Step:10 Tension Damage
i := 1, 2 .. n2
dt := 1 - (1/(2 + at)*((2*(1 + at)*e^(-bt*εck)) - (at*e^(-2*bt*εck))))
εtpl[i] := εck[i] - (σt[i]*dt[i])/((1 - dt[i])*Eo)
# USE THE TENSION DATA IN THIS TABLE IN ABAQUS (DOUBLE CLICK TO OPEN)
# [Excel component]
    excel["A2"] := σt
    excel["B2"] := εck
    excel["D2"] := dt
    excel["E2"] := εck
    excel["J2"] := "Eo"
    excel["K2"] := Eo
    excel["F2"] := εtpl
    excel["A1"] := "σt"
    excel["B1"] := "εck"
    excel["D1"] := "dt"
    excel["E1"] := "εck"
    excel["F1"] := "εtpl"
    σt := excel["A3:A17"]
    εck := excel["B3:B17"]
    dt := excel["D3:D17"]
    εtpl := excel["F3:F17"]
σt = [1.58083; 1.4195; 1.3059; 1.17414; 1.0332; 0.892136; 0.758999; 0.639917; 0.538496; 0.455652; 0.389923; 0.338154; 0.296387; 0.260731; 0.228031]
εck = [0; 9.70298e-5; 0.00017198; 0.000267722; 0.000383863; 0.00052001; 0.000675811; 0.000851; 0.00104542; 0.00125903; 0.00149189; 0.00174415; 0.00201597; 0.00230752; 0.00261895]
dt = [0; 0.0853486; 0.149809; 0.228994; 0.318993; 0.414876; 0.511351; 0.603525; 0.687501; 0.760716; 0.82198; 0.871296; 0.909557; 0.938212; 0.958952]
εtpl = [0; 9.1258e-5; 0.000161953; 0.000252526; 0.000362774; 0.000492446; 0.000641201; 0.000808554; 0.000993797; 0.00119591; 0.00141344; 0.0016444; 0.00188609; 0.00213501; 0.00238682]
# [plot: σt vs εck]
# [plot: dt vs εck]
