ORIGIN := 1
# Assume
b := 0.906
leq := 50
# The characteristic compressive strength of concrete is
fck := 25
fcm := fck + 8 = 33
ftm := 0.3016*fck^(2/3) = 2.57864
# We have as per author
fco := 0.4*fcm = 13.2
fto := ftm = 2.57864
# The strain at compressive stress strength as
εcm := 0.0022
# The initial tangenet modulus of deformation of concrete
Eci := 10000*fcm^(1/3) = 32075.3
# The undamaged modulus of deformation
Eo := Eci*(0.8 + (0.2*fcm/88)) = 28065.9
# The fracture and crushing energy in (N/mm) are
Gf := 0.073*fcm^0.18 = 0.136979
Gch := (fcm/ftm)^2*Gf = 22.4337
# The critical crack opening
wc := 5.14*Gf/ftm = 0.273041
# The first linear segment of concrete uniaxial compressive law
# (The first segment is linear from 0 to fco)
σc1 := transpose([0, fco])
εc1 := σc1/Eo
σc1 = [0; 13.2]
εc1 = [0; 0.000470321]
# The second segment of concrete uniaxial compressive law lies
# between 0.4fcm and fcm
fcm = 33
εcm = 0.0022
# Here the number of data required is
n2 := 20
# Common difference for data is
d2 := (εcm - εc1[2, 1])/n2 = 8.64839e-5
εc := [
    εc1[2, 1];
    εc1[2, 1] + (1*d2);
    εc1[2, 1] + (2*d2);
    εc1[2, 1] + (3*d2);
    εc1[2, 1] + (4*d2);
    εc1[2, 1] + (5*d2);
    εc1[2, 1] + (6*d2);
    εc1[2, 1] + (7*d2);
    εc1[2, 1] + (8*d2);
    εc1[2, 1] + (9*d2);
    εc1[2, 1] + (10*d2);
    εc1[2, 1] + (11*d2);
    εc1[2, 1] + (12*d2);
    εc1[2, 1] + (13*d2);
    εc1[2, 1] + (14*d2);
    εc1[2, 1] + (15*d2);
    εc1[2, 1] + (16*d2);
    εc1[2, 1] + (17*d2);
    εc1[2, 1] + (18*d2);
    0.0022
]
εc2 := εc
σc2 := ((((Eci*εc/fcm) - (εc/εcm)^2)/(1 + ((Eci*εcm/fcm) - 2)*εc/εcm))*fcm)
σc2 = [13.1875; 15.2131; 17.1196; 18.9088; 20.5824; 22.1422; 23.5901; 24.9277; 26.1567; 27.2787; 28.2954; 29.2083; 30.019; 30.7289; 31.3397; 31.8526; 32.2693; 32.591; 32.8191; 33]
εc2 = [0.000470321; 0.000556805; 0.000643289; 0.000729773; 0.000816257; 0.000902741; 0.000989225; 0.00107571; 0.00116219; 0.00124868; 0.00133516; 0.00142164; 0.00150813; 0.00159461; 0.0016811; 0.00176758; 0.00185406; 0.00194055; 0.00202703; 0.0022]
# The third segment of concrete uniaxial compressive law is a descending branch
εc2[20, 1] = 0.0022
d3 := (0.03 - 0.0022)/n2 = 0.00139
γc := (π^2*fcm*εcm)/(2*(Gch/leq - (0.5*fcm*(εcm*(1 - b) + (b*fcm/Eo))))^2) = 1.95866
εc3 := [
    εc2[20, 1];
    εc2[20, 1] + (1*d3);
    εc2[20, 1] + (2*d3);
    εc2[20, 1] + (3*d3);
    εc2[20, 1] + (4*d3);
    εc2[20, 1] + (5*d3);
    εc2[20, 1] + (6*d3);
    εc2[20, 1] + (7*d3);
    εc2[20, 1] + (8*d3);
    εc2[20, 1] + (9*d3);
    εc2[20, 1] + (10*d3);
    εc2[20, 1] + (11*d3);
    εc2[20, 1] + (12*d3);
    εc2[20, 1] + (13*d3);
    εc2[20, 1] + (14*d3);
    εc2[20, 1] + (15*d3);
    εc2[20, 1] + (16*d3);
    εc2[20, 1] + (17*d3);
    εc2[20, 1] + (18*d3);
    εc2[20, 1] + (19*d3)
]
σc3 := ((2 + γc*fcm*εcm)/(2*fcm) - (γc*εc3) + (εc3^2*γc)/(2*εcm))^-1
σc3 = [33; 32.0892; 29.6355; 26.2856; 22.6941; 19.3032; 16.3223; 13.8032; 11.7168; 10.0031; 8.59767; 7.44202; 6.48702; 5.69295; 5.02821; 4.46788; 3.9923; 3.58597; 3.23659; 2.93436]
εc3 = [0.0022; 0.00359; 0.00498; 0.00637; 0.00776; 0.00915; 0.01054; 0.01193; 0.01332; 0.01471; 0.0161; 0.01749; 0.01888; 0.02027; 0.02166; 0.02305; 0.02444; 0.02583; 0.02722; 0.02861]
# Combining all the data we have uniaxial model of concrete compression
# behaviour as:
σc := [
    σc1[1, 1];
    σc1[2, 1];
    σc2[3, 1];
    σc2[4, 1];
    σc2[5, 1];
    σc2[6, 1];
    σc2[7, 1];
    σc2[8, 1];
    σc2[9, 1];
    σc2[10, 1];
    σc2[11, 1];
    σc2[12, 1];
    σc2[13, 1];
    σc2[14, 1];
    σc2[15, 1];
    σc2[16, 1];
    σc2[17, 1];
    σc2[18, 1];
    σc2[19, 1];
    σc2[20, 1];
    σc3[2, 1];
    σc3[3, 1];
    σc3[4, 1];
    σc3[5, 1];
    σc3[6, 1];
    σc3[7, 1];
    σc3[8, 1];
    σc3[9, 1];
    σc3[10, 1];
    σc3[11, 1];
    σc3[12, 1];
    σc3[13, 1];
    σc3[14, 1];
    σc3[15, 1];
    σc3[16, 1];
    σc3[17, 1];
    σc3[18, 1];
    σc3[19, 1];
    σc3[20, 1]
]
εc := [
    εc1[1, 1];
    εc1[2, 1];
    εc2[3, 1];
    εc2[4, 1];
    εc2[5, 1];
    εc2[6, 1];
    εc2[7, 1];
    εc2[8, 1];
    εc2[9, 1];
    εc2[10, 1];
    εc2[11, 1];
    εc2[12, 1];
    εc2[13, 1];
    εc2[14, 1];
    εc2[15, 1];
    εc2[16, 1];
    εc2[17, 1];
    εc2[18, 1];
    εc2[19, 1];
    εc2[20, 1];
    εc3[2, 1];
    εc3[3, 1];
    εc3[4, 1];
    εc3[5, 1];
    εc3[6, 1];
    εc3[7, 1];
    εc3[8, 1];
    εc3[9, 1];
    εc3[10, 1];
    εc3[11, 1];
    εc3[12, 1];
    εc3[13, 1];
    εc3[14, 1];
    εc3[15, 1];
    εc3[16, 1];
    εc3[17, 1];
    εc3[18, 1];
    εc3[19, 1];
    εc3[20, 1]
]
σc = [
    0; 13.2; 17.1196; 18.9088; 20.5824; 22.1422; 23.5901; 24.9277; 26.1567; 27.2787
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]
εc = [
    0; 0.000470321; 0.000643289; 0.000729773; 0.000816257; 0.000902741; 0.000989225; 0.00107571; 0.00116219; 0.00124868
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]
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# First branch of concrete uniaxial tensile behaviour
ac := 2*(fcm/fco) - 1 + 2*sqrt((fcm/fco)^2 - (fcm/fco)) = 7.87298
at := 2*(ftm/fto) - 1 + 2*sqrt((ftm/fto)^2 - (ftm/fto)) = 1
bc := 1.97*(fck + 8)/Gch*leq = 144.894
bt := 0.453*fck^(2/3)*leq/Gf = 1413.75
σt1 := transpose([0, ftm])
εt1 := σt1/Eo
σt1 = [0; 2.57864]
εt1 = [0; 9.18781e-5]
# Second branch of concrete uniaxial tensile behaviour
# number of data
εt1[2, 1] = 9.18781e-5
c1 := 3
n3 := 40
# common difference
c2 := 6.93
d4 := (0.01 - εt1[2, 1])/n3 = 0.000247703
εt2 := [
    εt1[2, 1];
    εt1[2, 1] + (1*d4);
    εt1[2, 1] + (2*d4);
    εt1[2, 1] + (3*d4);
    εt1[2, 1] + (4*d4);
    εt1[2, 1] + (5*d4);
    εt1[2, 1] + (6*d4);
    εt1[2, 1] + (7*d4);
    εt1[2, 1] + (8*d4);
    εt1[2, 1] + (9*d4);
    εt1[2, 1] + (10*d4);
    εt1[2, 1] + (11*d4);
    εt1[2, 1] + (12*d4);
    εt1[2, 1] + (13*d4);
    εt1[2, 1] + (14*d4);
    εt1[2, 1] + (15*d4);
    εt1[2, 1] + (16*d4);
    εt1[2, 1] + (17*d4);
    εt1[2, 1] + (18*d4);
    εt1[2, 1] + (19*d4)
]
εt2 = [9.18781e-5; 0.000339581; 0.000587284; 0.000834987; 0.00108269; 0.00133039; 0.0015781; 0.0018258; 0.0020735; 0.00232121; 0.00256891; 0.00281661; 0.00306431; 0.00331202; 0.00355972; 0.00380742; 0.00405513; 0.00430283; 0.00455053; 0.00479824]
εtm := ftm/Eo = 9.18781e-5
w := (εt2 - εtm)*leq
σt2[1, 1] := ftm*(((1 + (c1*(εt2[1, 1] - εtm)*leq/wc)^3)*e^(-c2*(εt2[1, 1] - εtm)*leq/wc)) - ((εt2[1, 1] - εtm)*leq/wc*(1 + c1^3)*e^(-c2)))
σt2[2, 1] := ftm*(((1 + (c1*(εt2[2, 1] - εtm)*leq/wc)^3)*e^(-c2*(εt2[2, 1] - εtm)*leq/wc)) - ((εt2[2, 1] - εtm)*leq/wc*(1 + c1^3)*e^(-c2)))
σt2[3, 1] := ftm*(((1 + (c1*(εt2[3, 1] - εtm)*leq/wc)^3)*e^(-c2*(εt2[3, 1] - εtm)*leq/wc)) - ((εt2[3, 1] - εtm)*leq/wc*(1 + c1^3)*e^(-c2)))
σt2[4, 1] := ftm*(((1 + (c1*(εt2[4, 1] - εtm)*leq/wc)^3)*e^(-c2*(εt2[4, 1] - εtm)*leq/wc)) - ((εt2[4, 1] - εtm)*leq/wc*(1 + c1^3)*e^(-c2)))
σt2[5, 1] := ftm*(((1 + (c1*(εt2[5, 1] - εtm)*leq/wc)^3)*e^(-c2*(εt2[5, 1] - εtm)*leq/wc)) - ((εt2[5, 1] - εtm)*leq/wc*(1 + c1^3)*e^(-c2)))
σt2[6, 1] := ftm*(((1 + (c1*(εt2[6, 1] - εtm)*leq/wc)^3)*e^(-c2*(εt2[6, 1] - εtm)*leq/wc)) - ((εt2[6, 1] - εtm)*leq/wc*(1 + c1^3)*e^(-c2)))
σt2[7, 1] := ftm*(((1 + (c1*(εt2[7, 1] - εtm)*leq/wc)^3)*e^(-c2*(εt2[7, 1] - εtm)*leq/wc)) - ((εt2[7, 1] - εtm)*leq/wc*(1 + c1^3)*e^(-c2)))
σt2[8, 1] := ftm*(((1 + (c1*(εt2[8, 1] - εtm)*leq/wc)^3)*e^(-c2*(εt2[8, 1] - εtm)*leq/wc)) - ((εt2[8, 1] - εtm)*leq/wc*(1 + c1^3)*e^(-c2)))
σt2[9, 1] := ftm*(((1 + (c1*(εt2[9, 1] - εtm)*leq/wc)^3)*e^(-c2*(εt2[9, 1] - εtm)*leq/wc)) - ((εt2[9, 1] - εtm)*leq/wc*(1 + c1^3)*e^(-c2)))
σt2[10, 1] := ftm*(((1 + (c1*(εt2[10, 1] - εtm)*leq/wc)^3)*e^(-c2*(εt2[10, 1] - εtm)*leq/wc)) - ((εt2[10, 1] - εtm)*leq/wc*(1 + c1^3)*e^(-c2)))
σt2[11, 1] := ftm*(((1 + (c1*(εt2[11, 1] - εtm)*leq/wc)^3)*e^(-c2*(εt2[11, 1] - εtm)*leq/wc)) - ((εt2[11, 1] - εtm)*leq/wc*(1 + c1^3)*e^(-c2)))
σt2[12, 1] := ftm*(((1 + (c1*(εt2[12, 1] - εtm)*leq/wc)^3)*e^(-c2*(εt2[12, 1] - εtm)*leq/wc)) - ((εt2[12, 1] - εtm)*leq/wc*(1 + c1^3)*e^(-c2)))
σt2[13, 1] := ftm*(((1 + (c1*(εt2[13, 1] - εtm)*leq/wc)^3)*e^(-c2*(εt2[13, 1] - εtm)*leq/wc)) - ((εt2[13, 1] - εtm)*leq/wc*(1 + c1^3)*e^(-c2)))
σt2[14, 1] := ftm*(((1 + (c1*(εt2[14, 1] - εtm)*leq/wc)^3)*e^(-c2*(εt2[14, 1] - εtm)*leq/wc)) - ((εt2[14, 1] - εtm)*leq/wc*(1 + c1^3)*e^(-c2)))
σt2[15, 1] := ftm*(((1 + (c1*(εt2[15, 1] - εtm)*leq/wc)^3)*e^(-c2*(εt2[15, 1] - εtm)*leq/wc)) - ((εt2[15, 1] - εtm)*leq/wc*(1 + c1^3)*e^(-c2)))
σt2[16, 1] := ftm*(((1 + (c1*(εt2[16, 1] - εtm)*leq/wc)^3)*e^(-c2*(εt2[16, 1] - εtm)*leq/wc)) - ((εt2[16, 1] - εtm)*leq/wc*(1 + c1^3)*e^(-c2)))
σt2[17, 1] := ftm*(((1 + (c1*(εt2[17, 1] - εtm)*leq/wc)^3)*e^(-c2*(εt2[17, 1] - εtm)*leq/wc)) - ((εt2[17, 1] - εtm)*leq/wc*(1 + c1^3)*e^(-c2)))
σt2[18, 1] := ftm*(((1 + (c1*(εt2[18, 1] - εtm)*leq/wc)^3)*e^(-c2*(εt2[18, 1] - εtm)*leq/wc)) - ((εt2[18, 1] - εtm)*leq/wc*(1 + c1^3)*e^(-c2)))
σt2[19, 1] := ftm*(((1 + (c1*(εt2[19, 1] - εtm)*leq/wc)^3)*e^(-c2*(εt2[19, 1] - εtm)*leq/wc)) - ((εt2[19, 1] - εtm)*leq/wc*(1 + c1^3)*e^(-c2)))
σt2[20, 1] := ftm*(((1 + (c1*(εt2[20, 1] - εtm)*leq/wc)^3)*e^(-c2*(εt2[20, 1] - εtm)*leq/wc)) - ((εt2[20, 1] - εtm)*leq/wc*(1 + c1^3)*e^(-c2)))
# Combining all the data we have uniaxial model of concrete tension
# behaviour as:
σt := [σt1; σt2] = [
    [0; 2.57864]; [2.57864; 1.88464; 1.39648; 1.06295; 0.83882; 0.688225; 0.584747; 0.510036; 0.452032; 0.403275; 0.359475; 0.318419; 0.279164; 0.241486; 0.205516; 0.171514; 0.139737; 0.110381; 0.0835503; 0.0592614]
]
σt := [
    σt1[1, 1];
    σt1[2, 1];
    σt2[2, 1];
    σt2[3, 1];
    σt2[4, 1];
    σt2[5, 1];
    σt2[6, 1];
    σt2[7, 1];
    σt2[8, 1];
    σt2[9, 1];
    σt2[10, 1];
    σt2[11, 1];
    σt2[12, 1];
    σt2[13, 1];
    σt2[14, 1];
    σt2[15, 1];
    σt2[16, 1];
    σt2[17, 1];
    σt2[18, 1];
    σt2[19, 1];
    σt2[20, 1]
]
εt := [
    εt1[1, 1];
    εt1[2, 1];
    εt2[2, 1];
    εt2[3, 1];
    εt2[4, 1];
    εt2[5, 1];
    εt2[6, 1];
    εt2[7, 1];
    εt2[8, 1];
    εt2[9, 1];
    εt2[10, 1];
    εt2[11, 1];
    εt2[12, 1];
    εt2[13, 1];
    εt2[14, 1];
    εt2[15, 1];
    εt2[16, 1];
    εt2[17, 1];
    εt2[18, 1];
    εt2[19, 1];
    εt2[20, 1]
]
σt = [0; 2.57864; 1.88464; 1.39648; 1.06295; 0.83882; 0.688225; 0.584747; 0.510036; 0.452032; 0.403275; 0.359475; 0.318419; 0.279164; 0.241486; 0.205516; 0.171514; 0.139737; 0.110381; 0.0835503; 0.0592614]
εt = [0; 9.18781e-5; 0.000339581; 0.000587284; 0.000834987; 0.00108269; 0.00133039; 0.0015781; 0.0018258; 0.0020735; 0.00232121; 0.00256891; 0.00281661; 0.00306431; 0.00331202; 0.00355972; 0.00380742; 0.00405513; 0.00430283; 0.00455053; 0.00479824]
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# Calculation of compression damage and tension damage parameter
dc := 1 - ((1/(2 + ac))*((2*(1 + ac)*e^(-bc*εc)) - (ac*e^(-2*bc*εc))))
dt := 1 - ((1/(2 + at))*((2*(1 + at)*e^(-bt*εt)) - (at*e^(-2*bt*εt))))
dc = [
    0; 0.0168054; 0.0243442; 0.0283551; 0.0325176; 0.0368246; 0.0412696; 0.0458461; 0.0505478; 0.0553687
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]
εc = [
    0; 0.000470321; 0.000643289; 0.000729773; 0.000816257; 0.000902741; 0.000989225; 0.00107571; 0.00116219; 0.00124868
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]
dt = [0; 0.0861528; 0.302634; 0.482105; 0.621929; 0.727083; 0.804466; 0.860623; 0.901001; 0.929852; 0.95038; 0.964942; 0.975251; 0.982539; 0.987686; 0.991318; 0.99388; 0.995687; 0.99696; 0.997858; 0.998491]
εt = [0; 9.18781e-5; 0.000339581; 0.000587284; 0.000834987; 0.00108269; 0.00133039; 0.0015781; 0.0018258; 0.0020735; 0.00232121; 0.00256891; 0.00281661; 0.00306431; 0.00331202; 0.00355972; 0.00380742; 0.00405513; 0.00430283; 0.00455053; 0.00479824]
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σc = [
    0; 13.2; 17.1196; 18.9088; 20.5824; 22.1422; 23.5901; 24.9277; 26.1567; 27.2787
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]
εc = [
    0; 0.000470321; 0.000643289; 0.000729773; 0.000816257; 0.000902741; 0.000989225; 0.00107571; 0.00116219; 0.00124868
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]
σt = [0; 2.57864; 1.88464; 1.39648; 1.06295; 0.83882; 0.688225; 0.584747; 0.510036; 0.452032; 0.403275; 0.359475; 0.318419; 0.279164; 0.241486; 0.205516; 0.171514; 0.139737; 0.110381; 0.0835503; 0.0592614]
εt = [0; 9.18781e-5; 0.000339581; 0.000587284; 0.000834987; 0.00108269; 0.00133039; 0.0015781; 0.0018258; 0.0020735; 0.00232121; 0.00256891; 0.00281661; 0.00306431; 0.00331202; 0.00355972; 0.00380742; 0.00405513; 0.00430283; 0.00455053; 0.00479824]
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# CHECK FOR COMPRESSIVE PLASITIC STRAIN ( from which plastic strain negative data begins ? )
εcpl[1, 1] := εc[1, 1] - (σc[1, 1]*dc[1, 1])/((1 - dc[1, 1])*Eo) = 0
εcpl[11, 1] := εc[11, 1] - (σc[11, 1]*dc[11, 1])/((1 - dc[11, 1])*Eo) = 0.00127046
εcpl[21, 1] := εc[21, 1] - (σc[21, 1]*dc[21, 1])/((1 - dc[21, 1])*Eo) = 0.00327994
εcpl[31, 1] := εc[31, 1] - (σc[31, 1]*dc[31, 1])/((1 - dc[31, 1])*Eo) = 0.0158276
εcpl[2, 1] := εc[2, 1] - (σc[2, 1]*dc[2, 1])/((1 - dc[2, 1])*Eo) = 0.000462282
εcpl[12, 1] := εc[12, 1] - (σc[12, 1]*dc[12, 1])/((1 - dc[12, 1])*Eo) = 0.00134889
εcpl[22, 1] := εc[22, 1] - (σc[22, 1]*dc[22, 1])/((1 - dc[22, 1])*Eo) = 0.00449485
εcpl[32, 1] := εc[32, 1] - (σc[32, 1]*dc[32, 1])/((1 - dc[32, 1])*Eo) = 0.0170696
εcpl[3, 1] := εc[3, 1] - (σc[3, 1]*dc[3, 1])/((1 - dc[3, 1])*Eo) = 0.000628069
εcpl[13, 1] := εc[13, 1] - (σc[13, 1]*dc[13, 1])/((1 - dc[13, 1])*Eo) = 0.00142702
εcpl[23, 1] := εc[23, 1] - (σc[23, 1]*dc[23, 1])/((1 - dc[23, 1])*Eo) = 0.00571455
εcpl[33, 1] := εc[33, 1] - (σc[33, 1]*dc[33, 1])/((1 - dc[33, 1])*Eo) = 0.0182933
εcpl[4, 1] := εc[4, 1] - (σc[4, 1]*dc[4, 1])/((1 - dc[4, 1])*Eo) = 0.000710112
εcpl[14, 1] := εc[14, 1] - (σc[14, 1]*dc[14, 1])/((1 - dc[14, 1])*Eo) = 0.0015049
εcpl[24, 1] := εc[24, 1] - (σc[24, 1]*dc[24, 1])/((1 - dc[24, 1])*Eo) = 0.00695059
εcpl[34, 1] := εc[34, 1] - (σc[34, 1]*dc[34, 1])/((1 - dc[34, 1])*Eo) = 0.0194949
εcpl[5, 1] := εc[5, 1] - (σc[5, 1]*dc[5, 1])/((1 - dc[5, 1])*Eo) = 0.000791608
εcpl[15, 1] := εc[15, 1] - (σc[15, 1]*dc[15, 1])/((1 - dc[15, 1])*Eo) = 0.0015826
εcpl[25, 1] := εc[25, 1] - (σc[25, 1]*dc[25, 1])/((1 - dc[25, 1])*Eo) = 0.00820463
εcpl[35, 1] := εc[35, 1] - (σc[35, 1]*dc[35, 1])/((1 - dc[35, 1])*Eo) = 0.0206705
εcpl[6, 1] := εc[6, 1] - (σc[6, 1]*dc[6, 1])/((1 - dc[6, 1])*Eo) = 0.000872578
εcpl[16, 1] := εc[16, 1] - (σc[16, 1]*dc[16, 1])/((1 - dc[16, 1])*Eo) = 0.00166014
εcpl[26, 1] := εc[26, 1] - (σc[26, 1]*dc[26, 1])/((1 - dc[26, 1])*Eo) = 0.00947268
εcpl[36, 1] := εc[36, 1] - (σc[36, 1]*dc[36, 1])/((1 - dc[36, 1])*Eo) = 0.0218157
εcpl[7, 1] := εc[7, 1] - (σc[7, 1]*dc[7, 1])/((1 - dc[7, 1])*Eo) = 0.000953044
εcpl[17, 1] := εc[17, 1] - (σc[17, 1]*dc[17, 1])/((1 - dc[17, 1])*Eo) = 0.0017376
εcpl[27, 1] := εc[27, 1] - (σc[27, 1]*dc[27, 1])/((1 - dc[27, 1])*Eo) = 0.0107488
εcpl[37, 1] := εc[37, 1] - (σc[37, 1]*dc[37, 1])/((1 - dc[7, 1])*Eo) = 0.0257023
εcpl[8, 1] := εc[8, 1] - (σc[8, 1]*dc[8, 1])/((1 - dc[8, 1])*Eo) = 0.00103303
εcpl[18, 1] := εc[18, 1] - (σc[18, 1]*dc[18, 1])/((1 - dc[18, 1])*Eo) = 0.00181502
εcpl[28, 1] := εc[28, 1] - (σc[28, 1]*dc[28, 1])/((1 - dc[28, 1])*Eo) = 0.0120272
εcpl[38, 1] := εc[38, 1] - (σc[38, 1]*dc[38, 1])/((1 - dc[38, 1])*Eo) = 0.0239944
εcpl[9, 1] := εc[9, 1] - (σc[9, 1]*dc[9, 1])/((1 - dc[9, 1])*Eo) = 0.00111258
εcpl[19, 1] := εc[19, 1] - (σc[19, 1]*dc[19, 1])/((1 - dc[19, 1])*Eo) = 0.00189246
εcpl[29, 1] := εc[29, 1] - (σc[29, 1]*dc[29, 1])/((1 - dc[29, 1])*Eo) = 0.0133026
εcpl[39, 1] := εc[39, 1] - (σc[39, 1]*dc[39, 1])/((1 - dc[39, 1])*Eo) = 0.0250156
εcpl[10, 1] := εc[10, 1] - (σc[10, 1]*dc[10, 1])/((1 - dc[10, 1])*Eo) = 0.00119171
εcpl[20, 1] := εc[20, 1] - (σc[20, 1]*dc[20, 1])/((1 - dc[20, 1])*Eo) = 0.00204765
εcpl[30, 1] := εc[30, 1] - (σc[30, 1]*dc[30, 1])/((1 - dc[30, 1])*Eo) = 0.0145707
εcpl = [
    0; 0.000462282; 0.000628069; 0.000710112; 0.000791608; 0.000872578; 0.000953044; 0.00103303; 0.00111258; 0.00119171
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]
# CHECK FOR TENSILE PLASITIC STRAIN ( from which plastic strain negative data begins ? )
εtpl[11, 1] := εt[11, 1] - (σt[11, 1]*dt[11, 1])/((1 - dt[11, 1])*Eo) = 0.002046
εtpl[21, 1] := εt[21, 1] - (σt[21, 1]*dt[21, 1])/((1 - dt[21, 1])*Eo) = 0.00340135
εtpl[1, 1] := εt[1, 1] - (σt[1, 1]*dt[1, 1])/((1 - dt[1, 1])*Eo)
εtpl[12, 1] := εt[12, 1] - (σt[12, 1]*dt[12, 1])/((1 - dt[12, 1])*Eo)
εtpl[2, 1] := εt[2, 1] - (σt[2, 1]*dt[2, 1])/((1 - dt[2, 1])*Eo)
εtpl[13, 1] := εt[13, 1] - (σt[13, 1]*dt[13, 1])/((1 - dt[13, 1])*Eo)
εtpl[3, 1] := εt[3, 1] - (σt[3, 1]*dt[3, 1])/((1 - dt[3, 1])*Eo)
εtpl[14, 1] := εt[14, 1] - (σt[14, 1]*dt[14, 1])/((1 - dt[14, 1])*Eo)
εtpl[4, 1] := εt[4, 1] - (σt[4, 1]*dt[4, 1])/((1 - dt[4, 1])*Eo)
εtpl[15, 1] := εt[15, 1] - (σt[15, 1]*dt[15, 1])/((1 - dt[15, 1])*Eo)
εtpl[5, 1] := εt[5, 1] - (σt[5, 1]*dt[5, 1])/((1 - dt[5, 1])*Eo)
εtpl[16, 1] := εt[16, 1] - (σt[16, 1]*dt[16, 1])/((1 - dt[16, 1])*Eo)
εtpl[6, 1] := εt[6, 1] - (σt[6, 1]*dt[6, 1])/((1 - dt[6, 1])*Eo)
εtpl[17, 1] := εt[17, 1] - (σt[17, 1]*dt[17, 1])/((1 - dt[17, 1])*Eo)
εtpl[7, 1] := εt[7, 1] - (σt[7, 1]*dt[7, 1])/((1 - dt[7, 1])*Eo)
εtpl[18, 1] := εt[18, 1] - (σt[18, 1]*dt[18, 1])/((1 - dt[18, 1])*Eo)
εtpl[8, 1] := εt[8, 1] - (σt[8, 1]*dt[8, 1])/((1 - dt[8, 1])*Eo)
εtpl[19, 1] := εt[19, 1] - (σt[19, 1]*dt[19, 1])/((1 - dt[19, 1])*Eo)
εtpl[9, 1] := εt[9, 1] - (σt[9, 1]*dt[9, 1])/((1 - dt[9, 1])*Eo)
εtpl[20, 1] := εt[20, 1] - (σt[20, 1]*dt[20, 1])/((1 - dt[20, 1])*Eo)
εtpl[10, 1] := εt[10, 1] - (σt[10, 1]*dt[10, 1])/((1 - dt[10, 1])*Eo)
εcpl = [
    0; 0.000462282; 0.000628069; 0.000710112; 0.000791608; 0.000872578; 0.000953044; 0.00103303; 0.00111258; 0.00119171
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]
εtpl = [0; 8.32163e-5; 0.00031044; 0.000540966; 0.000772685; 0.00100307; 0.00122951; 0.00144945; 0.00166041; 0.00186001; 0.002046; 0.00221637; 0.00236954; 0.00250461; 0.0026219; 0.00272361; 0.00281497; 0.00290578; 0.00301289; 0.00316369; 0.00340135]
εcpltot := sum(εcpl[i, 1]/εc[i, 1], i = 1 .. 37) = 33.5257
bf := εcpltot/37 = 0.906099
# Revise the value of assumed value of b = bf until convergence
# Note: ONLY USE THOSE VALUES OF σc, εc, dc, σt, εt and dt WHICH HAVE INCREASING AND POSITIVE PLASTIC STRAIN VALUES OTHERWISE WARNING OCCURS IN ABAQUS
dc = [
    0; 0.0168054; 0.0243442; 0.0283551; 0.0325176; 0.0368246; 0.0412696; 0.0458461; 0.0505478; 0.0553687
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]
εc = [
    0; 0.000470321; 0.000643289; 0.000729773; 0.000816257; 0.000902741; 0.000989225; 0.00107571; 0.00116219; 0.00124868
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]
σc = [
    0; 13.2; 17.1196; 18.9088; 20.5824; 22.1422; 23.5901; 24.9277; 26.1567; 27.2787
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]
εc = [
    0; 0.000470321; 0.000643289; 0.000729773; 0.000816257; 0.000902741; 0.000989225; 0.00107571; 0.00116219; 0.00124868
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]
dt = [0; 0.0861528; 0.302634; 0.482105; 0.621929; 0.727083; 0.804466; 0.860623; 0.901001; 0.929852; 0.95038; 0.964942; 0.975251; 0.982539; 0.987686; 0.991318; 0.99388; 0.995687; 0.99696; 0.997858; 0.998491]
εt = [0; 9.18781e-5; 0.000339581; 0.000587284; 0.000834987; 0.00108269; 0.00133039; 0.0015781; 0.0018258; 0.0020735; 0.00232121; 0.00256891; 0.00281661; 0.00306431; 0.00331202; 0.00355972; 0.00380742; 0.00405513; 0.00430283; 0.00455053; 0.00479824]
σt = [0; 2.57864; 1.88464; 1.39648; 1.06295; 0.83882; 0.688225; 0.584747; 0.510036; 0.452032; 0.403275; 0.359475; 0.318419; 0.279164; 0.241486; 0.205516; 0.171514; 0.139737; 0.110381; 0.0835503; 0.0592614]
εt = [0; 9.18781e-5; 0.000339581; 0.000587284; 0.000834987; 0.00108269; 0.00133039; 0.0015781; 0.0018258; 0.0020735; 0.00232121; 0.00256891; 0.00281661; 0.00306431; 0.00331202; 0.00355972; 0.00380742; 0.00405513; 0.00430283; 0.00455053; 0.00479824]
