ORIGIN := 1
# From step 1 to step 6, initial calculations
fck := 25
leq := 50
b := 0.88874948
fcm := fck + 8 = 33
ftm := 0.3016*fck^(2/3) = 2.57864
ecm := 0.0022
Eci := 10000*fcm^(1/3)
Eo := Eci*(0.8 + (0.2*fcm/88)) = 28065.9
Gf := 0.073*fcm^0.18 = 0.136979
Gch := (fcm/ftm)^2*Gf = 22.4337
wc := 5.14*Gf/ftm = 0.273041
# Uniaxial Compressive Law
# First Segment
# First segment varies from 0 to fco
fco := 0.4*fcm = 13.2
σc1 := transpose([0, fco])
ec1 := σc1/Eo
σc1 = [0; 13.2]
ec1 = [0; 0.000470321]
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# Second Segment
fcm = 33
ecm = 0.0022
Eci = 32075.3
# The number of data required is ;
n2 := 20
# Let the common difference for the data be;
d := (ecm - ec1[2, 1])/n2 = 8.64839e-5
ec2 := [
    ec1[2, 1] + (1*d);
    ec1[2, 1] + (2*d);
    ec1[2, 1] + (3*d);
    ec1[2, 1] + (4*d);
    ec1[2, 1] + (5*d);
    ec1[2, 1] + (6*d);
    ec1[2, 1] + (7*d);
    ec1[2, 1] + (8*d);
    ec1[2, 1] + (9*d);
    ec1[2, 1] + (10*d);
    ec1[2, 1] + (11*d);
    ec1[2, 1] + (12*d);
    ec1[2, 1] + (13*d);
    ec1[2, 1] + (14*d);
    ec1[2, 1] + (15*d);
    ec1[2, 1] + (16*d);
    ec1[2, 1] + (17*d);
    ec1[2, 1] + (18*d);
    ec1[2, 1] + (19*d);
    ec1[2, 1] + (20*d)
]
ec2 = [0.000556805; 0.000643289; 0.000729773; 0.000816257; 0.000902741; 0.000989225; 0.00107571; 0.00116219; 0.00124868; 0.00133516; 0.00142164; 0.00150813; 0.00159461; 0.0016811; 0.00176758; 0.00185406; 0.00194055; 0.00202703; 0.00211352; 0.0022]
σc2 := ((Eci*ec2/fcm) - (ec2/ecm)^2)/(1 + (((Eci*ecm/fcm) - 2)*ec2/ecm))*fcm
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σc2 = [15.2131; 17.1196; 18.9088; 20.5824; 22.1422; 23.5901; 24.9277; 26.1567; 27.2787; 28.2954; 29.2083; 30.019; 30.7289; 31.3397; 31.8526; 32.2693; 32.591; 32.8191; 32.955; 33]
ec2 = [0.000556805; 0.000643289; 0.000729773; 0.000816257; 0.000902741; 0.000989225; 0.00107571; 0.00116219; 0.00124868; 0.00133516; 0.00142164; 0.00150813; 0.00159461; 0.0016811; 0.00176758; 0.00185406; 0.00194055; 0.00202703; 0.00211352; 0.0022]
x
# Third Segment
γc := π^2*fcm*ecm/(2*((Gch/leq) - ((0.5*fcm)*((ecm*(1 - b)) + (b*fcm/Eo))))^2) = 1.96134
# The number of data required is ;
n3 := 20
# Let the common difference for the data be;
d := (0.03 - ec2[20, 1])/n2 = 0.00139
ec3 := [
    ec2[20, 1] + (1*d);
    ec2[20, 1] + (2*d);
    ec2[20, 1] + (3*d);
    ec2[20, 1] + (4*d);
    ec2[20, 1] + (5*d);
    ec2[20, 1] + (6*d);
    ec2[20, 1] + (7*d);
    ec2[20, 1] + (8*d);
    ec2[20, 1] + (9*d);
    ec2[20, 1] + (10*d);
    ec2[20, 1] + (11*d);
    ec2[20, 1] + (12*d);
    ec2[20, 1] + (13*d);
    ec2[20, 1] + (14*d);
    ec2[20, 1] + (15*d);
    ec2[20, 1] + (16*d);
    ec2[20, 1] + (17*d);
    ec2[20, 1] + (18*d);
    ec2[20, 1] + (19*d);
    ec2[20, 1] + (20*d)
]
ec3 = [0.00359; 0.00498; 0.00637; 0.00776; 0.00915; 0.01054; 0.01193; 0.01332; 0.01471; 0.0161; 0.01749; 0.01888; 0.02027; 0.02166; 0.02305; 0.02444; 0.02583; 0.02722; 0.02861; 0.03]
σc3 := (((2 + (γc*fcm*ecm))/(2*fcm)) - (γc*ec3) + (ec3^2*γc/(2*ecm)))^-1
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σc3 = [32.088; 29.6314; 26.2783; 22.6845; 19.2923; 16.3111; 13.7923; 11.7065; 9.99358; 8.589; 7.43416; 6.47992; 5.68653; 5.0224; 4.46261; 3.98751; 3.58161; 3.23261; 2.93071; 2.66807]
ec3 = [0.00359; 0.00498; 0.00637; 0.00776; 0.00915; 0.01054; 0.01193; 0.01332; 0.01471; 0.0161; 0.01749; 0.01888; 0.02027; 0.02166; 0.02305; 0.02444; 0.02583; 0.02722; 0.02861; 0.03]
# The compressive behaviour with respect to total strain, i.e. stress vs total strain curve
σc := [
    σc1[1];
    σc1[2];
    σc2[1];
    σc2[2];
    σc2[3];
    σc2[4];
    σc2[5];
    σc2[6];
    σc2[7];
    σc2[8];
    σc2[9];
    σc2[10];
    σc2[11];
    σc2[12];
    σc2[13];
    σc2[14];
    σc2[15];
    σc2[16];
    σc2[17];
    σc2[18];
    σc2[19];
    σc2[20];
    σc3[1];
    σc3[2];
    σc3[3];
    σc3[4];
    σc3[5];
    σc3[6];
    σc3[7];
    σc3[8];
    σc3[9];
    σc3[10];
    σc3[11];
    σc3[12];
    σc3[13];
    σc3[14];
    σc3[15];
    σc3[16];
    σc3[17];
    σc3[18];
    σc3[19];
    σc3[20]
]
ec := [
    ec1[1];
    ec1[2];
    ec2[1];
    ec2[2];
    ec2[3];
    ec2[4];
    ec2[5];
    ec2[6];
    ec2[7];
    ec2[8];
    ec2[9];
    ec2[10];
    ec2[11];
    ec2[12];
    ec2[13];
    ec2[14];
    ec2[15];
    ec2[16];
    ec2[17];
    ec2[18];
    ec2[19];
    ec2[20];
    ec3[1];
    ec3[2];
    ec3[3];
    ec3[4];
    ec3[5];
    ec3[6];
    ec3[7];
    ec3[8];
    ec3[9];
    ec3[10];
    ec3[11];
    ec3[12];
    ec3[13];
    ec3[14];
    ec3[15];
    ec3[16];
    ec3[17];
    ec3[18];
    ec3[19];
    ec3[20]
]
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# Note: This data is actually not imported into ABAQUS, because this is total stress vs total strain plot, so we need to convert this data into stress vs inelastic strain plot.
# Concrete Uniaxial Tensile Law
# First branch of uniaxial tensile law:
ftm = 2.57864
σt1 := [0; ftm]
et1 := σt1/Eo
σt1 = [0; 2.57864]
et1 = [0; 9.18781e-5]
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# Second branch of uniaxial tensile law:
# Given by paper,
etm := et1[2] = 9.18781e-5
c1 := 3
c2 := 6.93
# Let total number of data points required be,
n := 20
# So common difference is
dd := (0.005 - et1[2])/n = 0.000245406
et2 := [
    et1[2] + (1*dd);
    et1[2] + (2*dd);
    et1[2] + (3*dd);
    et1[2] + (4*dd);
    et1[2] + (5*dd);
    et1[2] + (6*dd);
    et1[2] + (7*dd);
    et1[2] + (8*dd);
    et1[2] + (9*dd);
    et1[2] + (10*dd);
    et1[2] + (11*dd);
    et1[2] + (12*dd);
    et1[2] + (13*dd);
    et1[2] + (14*dd);
    et1[2] + (15*dd);
    et1[2] + (16*dd);
    et1[2] + (17*dd);
    et1[2] + (18*dd);
    et1[2] + (19*dd);
    et1[2] + (20*dd)
]
σt2[1] := ftm*(((1 + (c1*((et2[1] - etm)*leq)/wc)^3)*e^(-c2*((et2[1] - etm)*leq)/wc)) - (((et2[1] - etm)*leq)/wc*(1 + c1^3)*e^(-c2)))
σt2[2] := ftm*(((1 + (c1*((et2[2] - etm)*leq)/wc)^3)*e^(-c2*((et2[2] - etm)*leq)/wc)) - (((et2[2] - etm)*leq)/wc*(1 + c1^3)*e^(-c2)))
σt2[3] := ftm*(((1 + (c1*((et2[3] - etm)*leq)/wc)^3)*e^(-c2*((et2[3] - etm)*leq)/wc)) - (((et2[3] - etm)*leq)/wc*(1 + c1^3)*e^(-c2)))
σt2[4] := ftm*(((1 + (c1*((et2[4] - etm)*leq)/wc)^3)*e^(-c2*((et2[4] - etm)*leq)/wc)) - (((et2[4] - etm)*leq)/wc*(1 + c1^3)*e^(-c2)))
σt2[5] := ftm*(((1 + (c1*((et2[5] - etm)*leq)/wc)^3)*e^(-c2*((et2[5] - etm)*leq)/wc)) - (((et2[5] - etm)*leq)/wc*(1 + c1^3)*e^(-c2)))
σt2[6] := ftm*(((1 + (c1*((et2[6] - etm)*leq)/wc)^3)*e^(-c2*((et2[6] - etm)*leq)/wc)) - (((et2[6] - etm)*leq)/wc*(1 + c1^3)*e^(-c2)))
σt2[7] := ftm*(((1 + (c1*((et2[7] - etm)*leq)/wc)^3)*e^(-c2*((et2[7] - etm)*leq)/wc)) - (((et2[7] - etm)*leq)/wc*(1 + c1^3)*e^(-c2)))
σt2[8] := ftm*(((1 + (c1*((et2[8] - etm)*leq)/wc)^3)*e^(-c2*((et2[8] - etm)*leq)/wc)) - (((et2[8] - etm)*leq)/wc*(1 + c1^3)*e^(-c2)))
σt2[9] := ftm*(((1 + (c1*((et2[9] - etm)*leq)/wc)^3)*e^(-c2*((et2[9] - etm)*leq)/wc)) - (((et2[9] - etm)*leq)/wc*(1 + c1^3)*e^(-c2)))
σt2[10] := ftm*(((1 + (c1*((et2[10] - etm)*leq)/wc)^3)*e^(-c2*((et2[10] - etm)*leq)/wc)) - (((et2[10] - etm)*leq)/wc*(1 + c1^3)*e^(-c2)))
σt2[11] := ftm*(((1 + (c1*((et2[11] - etm)*leq)/wc)^3)*e^(-c2*((et2[11] - etm)*leq)/wc)) - (((et2[11] - etm)*leq)/wc*(1 + c1^3)*e^(-c2)))
σt2[12] := ftm*(((1 + (c1*((et2[12] - etm)*leq)/wc)^3)*e^(-c2*((et2[12] - etm)*leq)/wc)) - (((et2[12] - etm)*leq)/wc*(1 + c1^3)*e^(-c2)))
σt2[13] := ftm*(((1 + (c1*((et2[13] - etm)*leq)/wc)^3)*e^(-c2*((et2[13] - etm)*leq)/wc)) - (((et2[13] - etm)*leq)/wc*(1 + c1^3)*e^(-c2)))
σt2[14] := ftm*(((1 + (c1*((et2[14] - etm)*leq)/wc)^3)*e^(-c2*((et2[14] - etm)*leq)/wc)) - (((et2[14] - etm)*leq)/wc*(1 + c1^3)*e^(-c2)))
σt2[15] := ftm*(((1 + (c1*((et2[15] - etm)*leq)/wc)^3)*e^(-c2*((et2[15] - etm)*leq)/wc)) - (((et2[15] - etm)*leq)/wc*(1 + c1^3)*e^(-c2)))
σt2[16] := ftm*(((1 + (c1*((et2[16] - etm)*leq)/wc)^3)*e^(-c2*((et2[16] - etm)*leq)/wc)) - (((et2[16] - etm)*leq)/wc*(1 + c1^3)*e^(-c2)))
σt2[17] := ftm*(((1 + (c1*((et2[17] - etm)*leq)/wc)^3)*e^(-c2*((et2[17] - etm)*leq)/wc)) - (((et2[17] - etm)*leq)/wc*(1 + c1^3)*e^(-c2)))
σt2[18] := ftm*(((1 + (c1*((et2[18] - etm)*leq)/wc)^3)*e^(-c2*((et2[18] - etm)*leq)/wc)) - (((et2[18] - etm)*leq)/wc*(1 + c1^3)*e^(-c2)))
σt2[19] := ftm*(((1 + (c1*((et2[19] - etm)*leq)/wc)^3)*e^(-c2*((et2[19] - etm)*leq)/wc)) - (((et2[19] - etm)*leq)/wc*(1 + c1^3)*e^(-c2)))
σt2[20] := ftm*(((1 + (c1*((et2[20] - etm)*leq)/wc)^3)*e^(-c2*((et2[20] - etm)*leq)/wc)) - (((et2[20] - etm)*leq)/wc*(1 + c1^3)*e^(-c2)))
σt2 = [1.89005; 1.40397; 1.07056; 0.845629; 0.693995; 0.589611; 0.514276; 0.455948; 0.407112; 0.363399; 0.322516; 0.283454; 0.245942; 0.210081; 0.176116; 0.144303; 0.114843; 0.0878514; 0.0633581; 0.0413145]
et2 = [0.000337284; 0.00058269; 0.000828096; 0.0010735; 0.00131891; 0.00156431; 0.00180972; 0.00205513; 0.00230053; 0.00254594; 0.00279135; 0.00303675; 0.00328216; 0.00352756; 0.00377297; 0.00401838; 0.00426378; 0.00450919; 0.00475459; 0.005]
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# So the combined tensile stress vs total strain data is given as
σt := [
    σt1[1];
    σt1[2];
    σt2[1];
    σt2[2];
    σt2[3];
    σt2[4];
    σt2[5];
    σt2[6];
    σt2[7];
    σt2[8];
    σt2[9];
    σt2[10];
    σt2[11];
    σt2[12];
    σt2[13];
    σt2[14];
    σt2[15];
    σt2[16];
    σt2[17];
    σt2[18];
    σt2[19];
    σt2[20]
]
et := [
    et1[1];
    et1[2];
    et2[1];
    et2[2];
    et2[3];
    et2[4];
    et2[5];
    et2[6];
    et2[7];
    et2[8];
    et2[9];
    et2[10];
    et2[11];
    et2[12];
    et2[13];
    et2[14];
    et2[15];
    et2[16];
    et2[17];
    et2[18];
    et2[19];
    et2[20]
]
σt = [0; 2.57864; 1.89005; 1.40397; 1.07056; 0.845629; 0.693995; 0.589611; 0.514276; 0.455948; 0.407112; 0.363399; 0.322516; 0.283454; 0.245942; 0.210081; 0.176116; 0.144303; 0.114843; 0.0878514; 0.0633581; 0.0413145]
et = [0; 9.18781e-5; 0.000337284; 0.00058269; 0.000828096; 0.0010735; 0.00131891; 0.00156431; 0.00180972; 0.00205513; 0.00230053; 0.00254594; 0.00279135; 0.00303675; 0.00328216; 0.00352756; 0.00377297; 0.00401838; 0.00426378; 0.00450919; 0.00475459; 0.005]
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# However this data is not used in ABAQUS, as this is plot of tensile stress vs total strain, but we need to feed stress vs inelastic strain data to ABAQUS.
# Calculation of damage parameters
fto := ftm
ac := (2*fcm/fco) - 1 + (2*sqrt((fcm/fco)^2 - (fcm/fco))) = 7.87298
at := (2*ftm/fto) - 1 + (2*sqrt((ftm/fto)^2 - (ftm/fto))) = 1
bc := (1.97*(fck + 8)*leq/Gch) = 144.894
bt := 0.453*fck^(2/3)*leq/Gf = 1413.75
# Calculation of Inelastic Strain for both compressive and tensile behaviour
# We know:
#
# Inelastic Strain = Total Strain - Elastic Strain
et = [0; 9.18781e-5; 0.000337284; 0.00058269; 0.000828096; 0.0010735; 0.00131891; 0.00156431; 0.00180972; 0.00205513; 0.00230053; 0.00254594; 0.00279135; 0.00303675; 0.00328216; 0.00352756; 0.00377297; 0.00401838; 0.00426378; 0.00450919; 0.00475459; 0.005]
etelastic := σt/Eo = [0; 9.18781e-5; 6.73432e-5; 5.00241e-5; 3.81446e-5; 3.01301e-5; 2.47273e-5; 2.10081e-5; 1.83238e-5; 1.62456e-5; 1.45055e-5; 1.2948e-5; 1.14914e-5; 1.00996e-5; 8.76301e-6; 7.48526e-6; 6.27507e-6; 5.14156e-6; 4.09189e-6; 3.13018e-6; 2.25748e-6; 1.47205e-6]
ec = [
    0; 0.000470321; 0.000556805; 0.000643289; 0.000729773; 0.000816257; 0.000902741; 0.000989225; 0.00107571; 0.00116219
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]
ecelastic := σc/Eo = [
    0; 0.000470321; 0.00054205; 0.000609979; 0.000673726; 0.000733358; 0.000788937; 0.000840525; 0.000888184; 0.000931973
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]
ecin := ec - ecelastic
etin := et - etelastic
etin = [0; 0; 0.000269941; 0.000532666; 0.000789952; 0.00104337; 0.00129418; 0.00154331; 0.0017914; 0.00203888; 0.00228603; 0.00253299; 0.00277985; 0.00302665; 0.00327339; 0.00352008; 0.00376669; 0.00401323; 0.00425969; 0.00450606; 0.00475234; 0.00499853]
ecin = [
    0; 0; 1.47549e-5; 3.33102e-5; 5.60466e-5; 8.28992e-5; 0.000113804; 0.0001487; 0.000187525; 0.000230219
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]
# Calculation of Compressive and Tensile Damage Variable
dc := 1 - (1/(2 + ac)*((2*(1 + ac)*e^(-bc*ecin)) - (ac*e^(-2*bc*ecin))))
dt := 1 - (1/(2 + at)*((2*(1 + at)*e^(-bt*etin)) - (at*e^(-2*bt*etin))))
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dc = [
    0; 0; 0.000436253; 0.000993837; 0.00169056; 0.00253234; 0.00352623; 0.00468019; 0.00600302; 0.00750412
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]
dt = [0; 0; 0.245051; 0.446024; 0.599278; 0.712427; 0.794624; 0.8538; 0.896167; 0.926383; 0.947875; 0.963129; 0.973938; 0.981587; 0.986996; 0.990818; 0.993518; 0.995424; 0.996769; 0.997719; 0.99839; 0.998863]
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# Check for Compressive Plastic Strain
# Note that plastic strain value should be increasing and should not be negative
ecpl[31] := ecin[31] - σc[31]*dc[31]/((1 - dc[31])*Eo) = 0.0130316
ecpl[41] := ecin[41] - σc[41]*dc[41]/((1 - dc[41])*Eo) = 0.0249708
ecpl[21] := ecin[21] - σc[21]*dc[21]/((1 - dc[21])*Eo) = 0.000892061
ecpl[1] := ecin[1] - σc[1]*dc[1]/((1 - dc[1])*Eo) = 0
ecpl[11] := ecin[11] - σc[11]*dc[11]/((1 - dc[11])*Eo) = 0.000267707
ecpl[22] := ecin[22] - σc[22]*dc[22]/((1 - dc[22])*Eo) = 0.000971231
ecpl[32] := ecin[32] - σc[32]*dc[32]/((1 - dc[32])*Eo) = 0.0143422
ecpl[2] := ecin[2] - σc[2]*dc[2]/((1 - dc[2])*Eo) = 0
ecpl[12] := ecin[12] - σc[12]*dc[12]/((1 - dc[12])*Eo) = 0.000315688
ecpl[42] := ecin[42] - σc[42]*dc[42]/((1 - dc[42])*Eo) = 0.0259475
ecpl[3] := ecin[3] - σc[3]*dc[3]/((1 - dc[3])*Eo) = 1.45183e-5
ecpl[23] := ecin[23] - σc[23]*dc[23]/((1 - dc[23])*Eo) = 0.00227357
ecpl[13] := ecin[13] - σc[13]*dc[13]/((1 - dc[13])*Eo) = 0.000367044
ecpl[33] := ecin[33] - σc[33]*dc[33]/((1 - dc[33])*Eo) = 0.0156343
ecpl[4] := ecin[4] - σc[4]*dc[4]/((1 - dc[4])*Eo) = 3.27034e-5
ecpl[14] := ecin[14] - σc[14]*dc[14]/((1 - dc[14])*Eo) = 0.000421708
ecpl[24] := ecin[24] - σc[24]*dc[24]/((1 - dc[24])*Eo) = 0.00359477
ecpl[34] := ecin[34] - σc[34]*dc[34]/((1 - dc[34])*Eo) = 0.0169058
ecpl[5] := ecin[5] - σc[5]*dc[5]/((1 - dc[5])*Eo) = 5.49057e-5
ecpl[15] := ecin[15] - σc[15]*dc[15]/((1 - dc[15])*Eo) = 0.000479614
ecpl[25] := ecin[25] - σc[25]*dc[25]/((1 - dc[25])*Eo) = 0.00493574
ecpl[35] := ecin[35] - σc[35]*dc[35]/((1 - dc[35])*Eo) = 0.0181544
ecpl[6] := ecin[6] - σc[6]*dc[6]/((1 - dc[6])*Eo) = 8.10373e-5
ecpl[16] := ecin[16] - σc[16]*dc[16]/((1 - dc[16])*Eo) = 0.000540702
ecpl[26] := ecin[26] - σc[26]*dc[26]/((1 - dc[26])*Eo) = 0.00629068
ecpl[36] := ecin[36] - σc[36]*dc[36]/((1 - dc[36])*Eo) = 0.0193772
ecpl[7] := ecin[7] - σc[7]*dc[7]/((1 - dc[7])*Eo) = 0.000111013
ecpl[17] := ecin[17] - σc[17]*dc[17]/((1 - dc[17])*Eo) = 0.000604915
ecpl[27] := ecin[27] - σc[27]*dc[27]/((1 - dc[27])*Eo) = 0.00765155
ecpl[37] := ecin[37] - σc[37]*dc[37]/((1 - dc[37])*Eo) = 0.0205711
ecpl[8] := ecin[8] - σc[8]*dc[8]/((1 - dc[8])*Eo) = 0.000144748
ecpl[18] := ecin[18] - σc[18]*dc[18]/((1 - dc[18])*Eo) = 0.000672201
ecpl[28] := ecin[28] - σc[28]*dc[28]/((1 - dc[28])*Eo) = 0.009011
ecpl[38] := ecin[38] - σc[38]*dc[38]/((1 - dc[38])*Eo) = 0.0217323
ecpl[9] := ecin[9] - σc[9]*dc[9]/((1 - dc[9])*Eo) = 0.000182161
ecpl[19] := ecin[19] - σc[19]*dc[19]/((1 - dc[19])*Eo) = 0.000742514
ecpl[39] := ecin[39] - σc[39]*dc[39]/((1 - dc[39])*Eo) = 0.0228564
ecpl[29] := ecin[29] - σc[29]*dc[29]/((1 - dc[29])*Eo) = 0.0103633
ecpl[10] := ecin[10] - σc[10]*dc[10]/((1 - dc[10])*Eo) = 0.000223173
ecpl[20] := ecin[20] - σc[20]*dc[20]/((1 - dc[20])*Eo) = 0.000815812
ecpl[30] := ecin[30] - σc[30]*dc[30]/((1 - dc[30])*Eo) = 0.0117045
ecpl[40] := ecin[40] - σc[40]*dc[40]/((1 - dc[40])*Eo) = 0.0239379
ecpl = [
    0; 0; 1.45183e-5; 3.27034e-5; 5.49057e-5; 8.10373e-5; 0.000111013; 0.000144748; 0.000182161; 0.000223173
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]
# Check for Tensile Plastic Strain
etpl[1] := etin[1] - σt[1]*dt[1]/((1 - dt[1])*Eo) = 0
etpl[11] := etin[11] - σt[11]*dt[11]/((1 - dt[11])*Eo) = 0.00202225
etpl[21] := etin[21] - σt[21]*dt[21]/((1 - dt[21])*Eo) = 0.00335283
etpl[2] := etin[2] - σt[2]*dt[2]/((1 - dt[2])*Eo)
etpl[12] := etin[12] - σt[12]*dt[12]/((1 - dt[12])*Eo)
etpl[22] := etin[22] - σt[22]*dt[22]/((1 - dt[22])*Eo) = 0.00370552
etpl[3] := etin[3] - σt[3]*dt[3]/((1 - dt[3])*Eo)
etpl[13] := etin[13] - σt[13]*dt[13]/((1 - dt[13])*Eo)
etpl[4] := etin[4] - σt[4]*dt[4]/((1 - dt[4])*Eo)
etpl[14] := etin[14] - σt[14]*dt[14]/((1 - dt[14])*Eo)
etpl[5] := etin[5] - σt[5]*dt[5]/((1 - dt[5])*Eo)
etpl[15] := etin[15] - σt[15]*dt[15]/((1 - dt[15])*Eo)
etpl[6] := etin[6] - σt[6]*dt[6]/((1 - dt[6])*Eo)
etpl[16] := etin[16] - σt[16]*dt[16]/((1 - dt[16])*Eo)
etpl[7] := etin[7] - σt[7]*dt[7]/((1 - dt[7])*Eo)
etpl[17] := etin[17] - σt[17]*dt[17]/((1 - dt[17])*Eo)
etpl[8] := etin[8] - σt[8]*dt[8]/((1 - dt[8])*Eo)
etpl[18] := etin[18] - σt[18]*dt[18]/((1 - dt[18])*Eo)
etpl[9] := etin[9] - σt[9]*dt[9]/((1 - dt[9])*Eo)
etpl[19] := etin[19] - σt[19]*dt[19]/((1 - dt[19])*Eo)
etpl[10] := etin[10] - σt[10]*dt[10]/((1 - dt[10])*Eo)
etpl[20] := etin[20] - σt[20]*dt[20]/((1 - dt[20])*Eo)
etpl = [0; 0; 0.000248082; 0.00049239; 0.000732907; 0.000968729; 0.00119851; 0.00142062; 0.00163325; 0.00183445; 0.00202225; 0.00219477; 0.00235043; 0.00248824; 0.00260827; 0.00271231; 0.00280492; 0.00289483; 0.00299721; 0.00313684; 0.00335283; 0.00370552]
b := ecpl/ecin
b = [
    0; 0; 0.983966; 0.981783; 0.979644; 0.977541; 0.975468; 0.973421; 0.971396; 0.969392
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]
sum(b[i], i = 1 .. 42) = 37.3275
avg_b := sum(b[i], i = 1 .. 42)/42 = 0.888749
# DATA TO INPUT FOR ABAQUS
# COMPRESSIVE STRESS vs INELASTIC STRAIN
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# COMPRESSIVE DAMAGE vs INELASTIC STRAIN
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σc = [
    0; 13.2; 15.2131; 17.1196; 18.9088; 20.5824; 22.1422; 23.5901; 24.9277; 26.1567
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]
ecin = [
    0; 0; 1.47549e-5; 3.33102e-5; 5.60466e-5; 8.28992e-5; 0.000113804; 0.0001487; 0.000187525; 0.000230219
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]
dc = [
    0; 0; 0.000436253; 0.000993837; 0.00169056; 0.00253234; 0.00352623; 0.00468019; 0.00600302; 0.00750412
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]
ecin = [
    0; 0; 1.47549e-5; 3.33102e-5; 5.60466e-5; 8.28992e-5; 0.000113804; 0.0001487; 0.000187525; 0.000230219
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]
# TENSILE STRESS vs INELASTIC STRAIN
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# TENSILE DAMAGE vs INELASTIC STRAIN
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dt = [0; 0; 0.245051; 0.446024; 0.599278; 0.712427; 0.794624; 0.8538; 0.896167; 0.926383; 0.947875; 0.963129; 0.973938; 0.981587; 0.986996; 0.990818; 0.993518; 0.995424; 0.996769; 0.997719; 0.99839; 0.998863]
etin = [0; 0; 0.000269941; 0.000532666; 0.000789952; 0.00104337; 0.00129418; 0.00154331; 0.0017914; 0.00203888; 0.00228603; 0.00253299; 0.00277985; 0.00302665; 0.00327339; 0.00352008; 0.00376669; 0.00401323; 0.00425969; 0.00450606; 0.00475234; 0.00499853]
σt = [0; 2.57864; 1.89005; 1.40397; 1.07056; 0.845629; 0.693995; 0.589611; 0.514276; 0.455948; 0.407112; 0.363399; 0.322516; 0.283454; 0.245942; 0.210081; 0.176116; 0.144303; 0.114843; 0.0878514; 0.0633581; 0.0413145]
etin = [0; 0; 0.000269941; 0.000532666; 0.000789952; 0.00104337; 0.00129418; 0.00154331; 0.0017914; 0.00203888; 0.00228603; 0.00253299; 0.00277985; 0.00302665; 0.00327339; 0.00352008; 0.00376669; 0.00401323; 0.00425969; 0.00450606; 0.00475234; 0.00499853]
